*Heading
** Job name: Monotonic Model name: Model-1
** Generated by: Abaqus/CAE 2018
*Preprint, echo=NO, model=NO, history=NO, contact=NO
**
** PARTS
**
*Part, name=Part-1
*End Part
**
**
** ASSEMBLY
**
*Assembly, name=Assembly
**
*Instance, name=Part-1-1, part=Part-1
*Node
      1,          0.5,           0.
      2,           0.,           0.
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*************************************************
*User element, nodes=4, type=U1, properties=6, coordinates=2, var=48
1,2
1,3
*************************************************
*ELEMENT, TYPE=U1, ELSET=SOLID
  1,  403,  406,  176,  177
   2,  414,  415,  171,  172
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*************************************************
*UEL PROPERTY, ELSET=SOLID
210000., 0.3, 0.04, 2.7, 1e-07,1
**E,nu,lc,gc,k,FatigueFlag
*************************************************
*Element, type=CPE4, elset=Visualization
10001,403,406,176,177
10002,414,415,171,172
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*Nset, nset=Set-1, generate
     1,  4868,      1
*Elset, elset=Set-1, generate
     1,  4787,      1
** Section: Section-1
*Solid Section, elset=Visualization, material=Material-1
,
*End Instance
**
*Nset, nset=Bottom, instance=Part-1-1
   4,   5, 140, 141, 142, 143
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*Elset, elset=Bottom, instance=Part-1-1
    8,   16,   22,   29,   30,   38
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*Nset, nset=Crack, instance=Part-1-1
    2,    3,  107,  108,  109,  110
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*Elset, elset=Crack, instance=Part-1-1
   56,   57,   58,   59,   60,   61
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*Nset, nset=Top, instance=Part-1-1
   6,   7, 207, 208, 209, 210
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*Elset, elset=Top, instance=Part-1-1
 2371, 2372, 2401, 2402, 2403, 2422
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*Nset, nset=_PickedSet13, internal, instance=Part-1-1
 4,
*Elset, elset=ElCrack, internal, instance=Part-1-1
10001
*End Assembly
*Amplitude, name=Amp-1
*include, input=Amplitude.txt
**
** MATERIALS
**
*Material, name=Material-1
*Depvar
     12,
1, S11, S11
2, S22, S22
3, S33, S33
4, S12, S12
5, E11, E11
6, E22, E22
7, E33, E33
8, E12, E12
9, PHI, PHI
10, ALP, ALP
11, ALB, ALB
12, Ac, Ac
*User Material, constants=0
**
** BOUNDARY CONDITIONS
**
** Name: BC-1 Type: Displacement/Rotation
*Boundary
Bottom, 2, 2
** Name: BC-2 Type: Displacement/Rotation
*Boundary
_PickedSet13, 1, 1
** ----------------------------------------------------------------
**
** STEP: Step-1
**
*Step, name=Step-1, nlgeom=NO, inc=100000
*Static, direct
0.000625, 1.,
**
** BOUNDARY CONDITIONS
**
** Name: BC-3 Type: Displacement/Rotation
*Boundary, amplitude=Amp-1
Top, 2, 2, 1.
**
** CONTROLS
**
*Solution Technique, type=QUASI-NEWTON, reform kernel=25
*Controls, reset
*Controls, parameters=time incrementation
 10000,10000,8000,12000,500, 5, , , ,
 , , , , , , , ,
** OUTPUT REQUESTS
**
*Restart, write, frequency=0
**
** FIELD OUTPUT: F-Output-1
**
*Output, field, frequency=8
*Node Output
U,
*Element Output, directions=YES
SDV,
**
** HISTORY OUTPUT: H-Output-1
**
*Output, history
*Element Output, elset=Elcrack
SDV,
*End Step
