*Heading
** Job name: SimpleShear Model name: Model-1
** Generated by: Abaqus/CAE 2016
*Preprint, echo=NO, model=NO, history=NO, contact=NO
**
** PARTS
**
*Part, name=Part-1
*End Part
**
**
** ASSEMBLY
**
*Assembly, name=Assembly
**
*Instance, name=Part-1-1, part=Part-1
*Node
      1,           1.,         200.
      2,           0.,         200.
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*USER ELEMENT,TYPE=U1,NODES=8,COORDINATES=2,PROPERTIES=10,VAR=126
1,2,3,4,5,6
*ELEMENT, TYPE=U1, ELSET=SOLID
  1,    1,    2,    4,    3,  403,  404,  405,  406
  2,    3,    4,    6,    5,  405,  407,  408,  409
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*UEL PROPERTY, ELSET=SOLID
68380.,0.3,200.,20.,0.,0.667,1.e-4,0.2,
0.05, 3
**E,nu,Sy,Le,Ld,X,e0,N,m,flag
*Element, type=cpe8, elset=output
1001,    1,    2,    4,    3,  403,  404,  405,  406
1002,    3,    4,    6,    5,  405,  407,  408,  409
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*Nset, nset=Set-1, generate
    1,  1003,     1
*Elset, elset=Set-1, generate
   1,  200,    1
** Section: Section-1
*Solid Section, elset=output, material=user
,
*End Instance
**
*Nset, nset=Set-1, instance=Part-1-1
  401,  402, 1002
*Elset, elset=Set-1, instance=Part-1-1
 200,
*Nset, nset=Set-2, instance=Part-1-1
    1,    2,    3,    4,    5,    6
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*Elset, elset=Set-2, instance=Part-1-1, generate
   1,  200,    1
*Nset, nset=Set-3, instance=Part-1-1
   1,   2, 403
*Elset, elset=Set-3, instance=Part-1-1
 1,
*Elset, elset=Ref, instance=Part-1-1
 1100,
*End Assembly
**
** MATERIALS
**
*Material, name=user
*Depvar
     22
1, S11, S11
2, S22, S22
3, S33, S33
4, S12, S12
5, E11, E11
6, E22, E22
7, E33, E33
8, E12, E12
9, EP11, EP11
10, EP22, EP22
11, EP33, EP33
12, EP12, EP12
13, Alph13, Alph13
14, Alph23, Alph23
15, Alph31, Alph31
16, Alph32, Alph32
17, Z13, Z13
18, Z23, Z23
19, Z31, Z31
20, Z32, Z32
21, PS12, PS12
22, EP, EP
*User Material, constants=1
200.,
**
** BOUNDARY CONDITIONS
**
** Name: Bot Type: Displacement/Rotation
*Boundary
Set-1, 1, 1
Set-1, 2, 2
Set-1, 3, 3
Set-1, 4, 4
Set-1, 5, 5
Set-1, 6, 6
** Name: Sides Type: Displacement/Rotation
*Boundary
Set-2, 2, 2
Set-2, 3, 3
Set-2, 4, 4
** ----------------------------------------------------------------
**
** STEP: Step-1
**
*Step, name=Step-1, nlgeom=NO, inc=1000
*Static
0.0000001, 1., 1e-20, 0.01
**
** BOUNDARY CONDITIONS
**
** Name: Top Type: Displacement/Rotation
*Boundary
Set-3, 1, 1, 20.
Set-3, 2, 2
Set-3, 3, 3
Set-3, 4, 4
Set-3, 5, 5
Set-3, 6, 6
**
** OUTPUT REQUESTS
**
*Restart, write, frequency=0
**
** FIELD OUTPUT: F-Output-1
**
*Output, field
*Node Output
U,
*Element Output, directions=YES
SDV,
**
** HISTORY OUTPUT: H-Output-1
**
*Output, history
*Element Output, elset=Ref
SDV,
*End Step
