*Heading
** Job name: Job-5 Model name: Q4 - Inert
** Generated by: Abaqus/CAE 2017
*Preprint, echo=NO, model=NO, history=NO, contact=NO
**
** PARTS
**
*Part, name=Part-1
*End Part
**
**
** ASSEMBLY
**
*Assembly, name=Assembly
**
*Instance, name=Part-1-1, part=Part-1
*Node
      1,         -0.5,           0.
      2,           0.,           0.
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*************************************************
*User element, nodes=4, type=U1, properties=5, coordinates=2, var=36
1,2
1,3
*************************************************
*ELEMENT, TYPE=U1, ELSET=SOLID
   1, 2616, 2603,  197,  198
   2, 2446,  196,  197, 2603
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*************************************************
*UEL PROPERTY, ELSET=SOLID
210000., 0.3, 0.04, 2.7, 1e-07
**E,nu,lc,gc,k
*************************************************
*Element, type=CPE4, elset=Visualization
10001, 2616, 2603,  197,  198
10002, 2446,  196,  197, 2603
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*Nset, nset=Set-1, generate
    1,  5506,     1
*Elset, elset=Set-1, generate
    1,  5409,     1
** Section: Section-1
*Solid Section, elset=Visualization, material=Material-1
,
*End Instance
**
*Nset, nset=BottomSide, instance=Part-1-1
   6,   7, 211, 212, 213, 214
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*Elset, elset=BottomSide, instance=Part-1-1
 2767, 2768, 2769, 2787, 2788, 2789
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*Nset, nset=Full, instance=Part-1-1, generate
    1,  5506,     1
*Elset, elset=Full, instance=Part-1-1, generate
    1,  5409,     1
*Nset, nset=LeftSide, instance=Part-1-1
    1,    5,    6,  187,  188,  189
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*Elset, elset=LeftSide, instance=Part-1-1
    1,    2,    3,    4,    5,    7
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*Nset, nset=RightSide, instance=Part-1-1
   3,   4,   7, 135, 136, 137
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*Elset, elset=RightSide, instance=Part-1-1
   19,   21,   89,   97,  104,  108
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*Nset, nset=Set-6, instance=Part-1-1
    1,    2,    8,    9,   10,   11
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*Elset, elset=Set-6, instance=Part-1-1
   86,   87,   88,  146,  157,  173
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*Nset, nset=TopSide, instance=Part-1-1
   4,   5, 163, 164, 165, 166
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*Elset, elset=TopSide, instance=Part-1-1
   10,   11,   27,   28,   78,  102
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*End Assembly
**
** MATERIALS
**
*Material, name=Material-1
*Depvar
     9,
1, S11, S11
2, S22, S22
3, S33, S33
4, S12, S12
5, E11, E11
6, E22, E22
7, E33, E33
8, E12, E12
9, PHI, PHI
*User Material, constants=0
**
** BOUNDARY CONDITIONS
**
** Name: BC-1 Type: Displacement/Rotation
*Boundary
BottomSide, 1, 1
BottomSide, 2, 2
** ----------------------------------------------------------------
**
** STEP: Step-1
**
*Step, name=Step-1, nlgeom=NO, inc=1000000
*Static, direct
0.001, 1.,
**
** CONTROLS
**
*Controls, reset
*Controls, parameters=field, field=displacement
1e+20, 1e+20, , , , , ,
*Controls, parameters=field, field=hydrostatic fluid pressure
1e+20, 1e+20, , , , , ,
*Controls, parameters=field, field=rotation
1e+20, 1e+20, , , , , ,
*Controls, parameters=field, field=electrical potential
1e+20, 1e+20, , , , , ,
**
** BOUNDARY CONDITIONS
**
** Name: BC-2 Type: Displacement/Rotation
*Boundary
TopSide, 2, 2, 0.01
**
** OUTPUT REQUESTS
**
*Restart, write, frequency=0
**
** FIELD OUTPUT: F-Output-1
**
*Output, field, frequency=50
*Node Output
CF, RF, U
*Element Output, directions=YES
E, SDV
**
** HISTORY OUTPUT: H-Output-1
**
*Output, history, frequency=10
*Node Output, nset=BottomSide
RF2,
**
** HISTORY OUTPUT: H-Output-2
**
*Node Output, nset=TopSide
U2,
*End Step
