*Heading
** Job name: SENT Model name: SENT
** Generated by: Abaqus/CAE 2018
*Preprint, echo=NO, model=NO, history=NO, contact=NO
**
** PARTS
**
*Part, name=Part-1
*End Part
**
**
** ASSEMBLY
**
*Assembly, name=Assembly
**
*Instance, name=Part-1-1, part=Part-1
*Node
      1, -0.0500000007,           0.
      2, -0.0500000007, -0.0500000007
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*************************************************
*User element, nodes=4, type=U1, properties=3, coordinates=2, var=44,
   INTEGRATION=4, TENSOR=PSTRAIN
1,2
1,3
*************************************************
*ELEMENT, TYPE=U1, ELSET=SOLID
   1, 8614,   13,  596, 8613
   2,   13,   14,  597,  596
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*************************************************
*UEL PROPERTY, ELSET=SOLID, MATERIAL=Material-1
0.024, 2.7, 0
**l,Gc,FlagSolution (0-mono, 1-stag)
*************************************************
*Element, type=CPE4, elset=Visualization
10001,8614,13,596,8613
10002,13,14,597,596
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*Nset, nset=Set-1, generate
    1,  8636,     1
*Elset, elset=Set-1, generate
    1,  8532,     1
** Section: Section-1
*Solid Section, elset=Visualization, material=Material-2
,
*End Instance
**
*Nset, nset=Bottom, instance=Part-1-1
  11,  12, 553, 554, 555, 556
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*Elset, elset=Bottom, instance=Part-1-1
 6090, 6091, 6113, 6114, 6150, 6153
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*Nset, nset=Crack, instance=Part-1-1
    1,    4,   10,  174,  175,  176
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*Elset, elset=Crack, instance=Part-1-1
    1,   14,   27,   40,   53,   66
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*Nset, nset=Right, instance=Part-1-1
   3,   5,   7,   8,  12, 162
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*Elset, elset=Right, instance=Part-1-1
 1782, 1783, 1784, 1785, 1786, 1787
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 *Nset, nset=BotRight, instance=Part-1-1
   12
*Nset, nset=Top, instance=Part-1-1
   8,   9, 495, 496, 497, 498
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*Elset, elset=Top, instance=Part-1-1
 3610, 3611, 3626, 3627, 3628, 3678
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*Nset, nset=Full,instance=part-1-1, generate
     1,  8636,      1
*End Assembly
**
** MATERIALS
**
*MATERIAL, NAME=Material-1
*SUPERELASTIC
22000.,   0.33, 0.0335,  456.5, 563.75,   363.,   209.,  456.5
    47.,    5.5,    5.5,     0.
*Elastic
41000., 0.33
*Material, name=Material-2
*Depvar
     11,
1, S11, S11
2, S22, S22
3, S33, S33
4, S12, S12
5, E11, E11
6, E22, E22
7, E33, E33
8, E12, E12
9, PHI, PHI
10, H, H
11, PSI, PSI
*User Material, constants=1
8532.
** Name: BC-1 Type: Displacement/Rotation
*Boundary
BotRight, 1, 1
Bottom, 2, 2
** PREDEFINED FIELDS
**
** Name: Predefined Field-1   Type: Temperature
*Initial Conditions, type=TEMPERATURE
Full, 47.
** STEP: Step-1
**
*Step, name=Step-3, nlgeom=NO, inc=10000
*Static
0.25, 1., 1e-15, 0.25
*Solution Technique, type=QUASI-NEWTON, reform kernel=25
*Controls, reset
*Controls, parameters=time incrementation
 10000,10000,8000,12000,500, 5, , , ,
 , , , , , , , ,
*Boundary
Top, 2, 2, 0.1
**
*Restart, write, frequency=0
**
** FIELD OUTPUT: F-Output-1
**
*Output, field, frequency=1
*Node Output
U
*Element Output, directions=YES
SDV
**
** HISTORY OUTPUT: H-Output-1
**
*Output, history, frequency=1
*Node Output, nset=Top
RF2, U2
*End Step
