*Heading
** Job name: PhaseFieldSCC-CPER8T-k0005-Dis2 Model name: PhaseFieldSCC-CPER8T-k0005-Dis2
** Generated by: Abaqus/CAE 2022
*Preprint, echo=NO, model=NO, history=NO, contact=NO
**
** PARTS
**
*Part, name=Part-1
*Node
      1,           0.,  0.129999995
      2,           0., 0.0850000009
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*Element, type=CPE8RT
   1,  399, 1512, 1509,  996, 4860, 4861, 4862, 4863
   2,  560, 1090,  584,  671, 4864, 4865, 4866, 4867
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*Nset, nset=Set-1, generate
     1,  14506,      1
*Elset, elset=Set-1, generate
    1,  4789,     1
** Section: Section-1
*Solid Section, elset=Set-1, material=Material-1
,
*End Part
**
*Part, name=Part-1-Copy
*Node
      1,           0.,  0.129999995
      2,           0., 0.0850000009
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*Element, type=CPE8RT
   1,  399, 1512, 1509,  996, 4860, 4861, 4862, 4863
   2,  560, 1090,  584,  671, 4864, 4865, 4866, 4867
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*Nset, nset=Set-1, generate
     1,  14506,      1
*Elset, elset=Set-1, generate
    1,  4789,     1
** Section: Section-2
*Solid Section, elset=Set-1, material=Material-2
,
*End Part
**
**
** ASSEMBLY
**
*Assembly, name=Assembly
**
*Instance, name=Part-1-1, part=Part-1
*End Instance
**
*Instance, name=Part-1-Copy-1, part=Part-1-Copy
        0.33,           0.,           0.
*End Instance
**
*Nset, nset=Set-1, instance=Part-1-1, generate
     1,  14506,      1
*Elset, elset=Set-1, instance=Part-1-1, generate
    1,  4789,     1
*Nset, nset=Set-3, instance=Part-1-1
    11,    12,   344,   345,   346,   347
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*Elset, elset=Set-3, instance=Part-1-1
 2543, 2544, 2546, 2548, 2549, 2550, 2594, 2618, 4430, 4465
*Nset, nset=Set-4, instance=Part-1-1
     9,    10,   316,   317,   318,   319
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*Elset, elset=Set-4, instance=Part-1-1
 2479, 2486, 2487, 2495, 2500, 2506, 2514, 2515, 2617, 4424
*Nset, nset=Set-5, instance=Part-1-1
    1,    5,    8,  159,  160,  161
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*Elset, elset=Set-5, instance=Part-1-1
   11,   96,  112,  116,  124,  127
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*Nset, nset=Set-7, instance=Part-1-Copy-1, generate
     1,  14506,      1
*Elset, elset=Set-7, instance=Part-1-Copy-1, generate
    1,  4789,     1
*Nset, nset=Set-8, instance=Part-1-Copy-1
    1,    5,    8,  159,  160,  161
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*Elset, elset=Set-8, instance=Part-1-Copy-1
   11,   96,  112,  116,  124,  127
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*Nset, nset=Set-11, instance=Part-1-1
 12,
*End Assembly
*Amplitude, name=Amp-1
             0.,              1.,       10000000.,              1.
*Amplitude, name=Amp-2
             0.,              1.,           0.005,              0.,      100000000.,              0.
**
** MATERIALS
**
*Material, name=Material-1
*Density
1.,
*Depvar
     24,
*User Material, constants=12, type=THERMAL
190000.,     0.3,    520.,   0.067, 0.00085,   0.001, 5.1e-05,    35.3
    53.5,  0.0005,   0.003,     10.
*User Material, constants=12, type=MECHANICAL
190000.,     0.3,    520.,   0.067, 0.00085,   0.001, 5.1e-05,    35.3
    53.5,  0.0005,   0.003,     10.
*Material, name=Material-2
*Density
1.,
*User Material, constants=1, type=THERMAL
 0.00085,
*User Material, constants=1, type=MECHANICAL
1.,
**
** BOUNDARY CONDITIONS
**
** Name: BC-7 Type: Displacement/Rotation
*Boundary
Set-11, 2, 2
** ----------------------------------------------------------------
**
** STEP: Step-1
**
*Step, name=Step-1, nlgeom=NO, inc=1, unsymm=NO
*Coupled Temperature-displacement, creep=none
1., 1.,
*Solution Technique, type=SEPARATED
**
** BOUNDARY CONDITIONS
**
** Name: Ini-c-P2 Type: Temperature
*Boundary, amplitude=Amp-1
Set-7, 11, 11, 1.
** Name: Ini-phi-P1 Type: Temperature
*Boundary, amplitude=Amp-1
Set-1, 11, 11, 1.
**
** CONTROLS
**
*Controls, reset
*Controls, analysis=discontinuous
**
** OUTPUT REQUESTS
**
*Restart, write, frequency=0
**
** FIELD OUTPUT: F-Output-1
**
*Output, field, frequency=200
*Node Output
NT, RFL
*Element Output, directions=YES
HFL, S, SDV, TEMP
*Output, history, frequency=0
*End Step
** ----------------------------------------------------------------
**
** STEP: Step-2
**
*Step, name=Step-2, nlgeom=NO, inc=1, unsymm=NO
*Coupled Temperature-displacement, creep=none
1., 1.,
*Solution Technique, type=SEPARATED
**
** BOUNDARY CONDITIONS
**
** Name: BC-7 Type: Displacement/Rotation
*Boundary, op=NEW
Set-11, 2, 2
** Name: Ini-c-P2 Type: Temperature
*Boundary, op=NEW
** Name: Ini-phi-P1 Type: Temperature
*Boundary, op=NEW
**
** OUTPUT REQUESTS
**
*Restart, write, frequency=0
**
** FIELD OUTPUT: F-Output-1
**
*Output, field, frequency=200
*Node Output
NT, RFL
*Element Output, directions=YES
HFL, S, SDV, TEMP
*Output, history, frequency=0
*End Step
** ----------------------------------------------------------------
**
** STEP: Step-3
**
*Step, name=Step-3, nlgeom=NO, inc=1000000000, unsymm=NO
*Coupled Temperature-displacement, creep=none, deltmx=1.
1e-05, 1., 1e-50, 0.1
*Solution Technique, type=SEPARATED
**
** BOUNDARY CONDITIONS
**
** Name: Left-Ux-P1 Type: Displacement/Rotation
*Boundary, amplitude=Amp-1
Set-4, 1, 1, -0.0002
** Name: Right-Ux-P1 Type: Displacement/Rotation
*Boundary, amplitude=Amp-1
Set-3, 1, 1, 0.0002
**
** OUTPUT REQUESTS
**
*Restart, write, frequency=0
**
** FIELD OUTPUT: F-Output-1
**
*Output, field, frequency=200
*Node Output
NT, RFL
*Element Output, directions=YES
HFL, S, SDV, TEMP
*Output, history, frequency=0
*End Step
** ----------------------------------------------------------------
**
** STEP: Step-4
**
*Step, name=Step-4, nlgeom=NO, inc=1000000000, unsymm=NO
*Coupled Temperature-displacement, creep=none, deltmx=1.
0.001, 900., 1e-10, 0.25
*Solution Technique, type=SEPARATED
**
** BOUNDARY CONDITIONS
**
** Name: Interface-P2 Type: Temperature
*Boundary, amplitude=Amp-2
Set-8, 11, 11, 1.
** Name: interface-P1 Type: Temperature
*Boundary, amplitude=Amp-2
Set-5, 11, 11, 1.
**
** CONTROLS
**
*Controls, reset
*Controls, parameters=field, field=global
0.1, 0.1, , , 0.5, , ,
**
** OUTPUT REQUESTS
**
*Restart, write, frequency=0
**
** FIELD OUTPUT: F-Output-1
**
*Output, field, frequency=20
*Node Output
NT, RFL
*Element Output, directions=YES
HFL, S, SDV, TEMP
*Output, history, frequency=0
*End Step
