*Heading
** Job name: HF-Simple Model name: PC-Monolithic-NoSplit-Anisotropic-Per1
** Generated by: Abaqus/CAE 2022
*Preprint, echo=NO, model=NO, history=NO, contact=NO
**
** PARTS
**
*Part, name=Part-1
*Node
      1,          0.5, 0.00999999978
      2,           0., 0.00999999978
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*Element, type=CPE4T
   1,    1,    8, 1333, 1278
   2,    8,    9, 1334, 1333
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*Nset, nset=Set-3, generate
     1,  22032,      1
*Elset, elset=Set-3, generate
     1,  21677,      1
** Section: Section-1
*Solid Section, elset=Set-3, material=Material-1
,
*End Part
**
*Part, name=Part-1-Copy
*Node
      1,          0.5, 0.00999999978
      2,           0., 0.00999999978
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*Element, type=CPE4T
   1,    1,    8, 1333, 1278
   2,    8,    9, 1334, 1333
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*Nset, nset=Set-3, generate
     1,  22032,      1
*Elset, elset=Set-3, generate
     1,  21677,      1
** Section: Section-2
*Solid Section, elset=Set-3, material=Material-2
,
*End Part
**
**
** ASSEMBLY
**
*Assembly, name=Assembly
**
*Instance, name=Part-1-1, part=Part-1
*End Instance
**
*Instance, name=Part-1-Copy-1, part=Part-1-Copy
        0.55,           0.,           0.
*End Instance
**
*Nset, nset=Notch, instance=Part-1-1
    3,    4, 1143, 1144, 1145, 1146
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*Elset, elset=Notch, instance=Part-1-1, generate
 8001,  8125,     1
*Nset, nset=Set-1, instance=Part-1-1
    1,    5,    6,    7, 1267, 1268
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*Elset, elset=Set-1, instance=Part-1-1
     1,   626,  1251,  1876,  2501,  3126
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*Nset, nset=Set-2, instance=Part-1-1
    2,    4,    7,  632,  633,  634
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*Elset, elset=Set-2, instance=Part-1-1
   625,  1250,  1875,  2500,  3125,  3750
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*Nset, nset=Set-3, instance=Part-1-1
    3,    5,  644,  645,  646,  647
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*Elset, elset=Set-3, instance=Part-1-1, generate
 7501,  8000,     1
*Nset, nset=Set-4, instance=Part-1-Copy-1
    6,    7, 1298, 1299, 1300, 1301
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*Elset, elset=Set-4, instance=Part-1-Copy-1
 8137, 8148, 8149, 8158, 8174, 8175
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*Nset, nset=Set-5, instance=Part-1-Copy-1
    3,    4, 1143, 1144, 1145, 1146
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*Elset, elset=Set-5, instance=Part-1-Copy-1, generate
 8001,  8125,     1
*Nset, nset=Set-6, instance=Part-1-1
    3,    4, 1143, 1144, 1145, 1146
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*Elset, elset=Set-6, instance=Part-1-1, generate
 8001,  8125,     1
*Nset, nset=Set-7, instance=Part-1-1
    3,    4, 1143, 1144, 1145, 1146
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*Elset, elset=Set-7, instance=Part-1-1, generate
 8001,  8125,     1
*Nset, nset=Set-8, instance=Part-1-1
    3,    4, 1143, 1144, 1145, 1146
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*Elset, elset=Set-8, instance=Part-1-1, generate
 8001,  8125,     1
*Nset, nset=Set-10, instance=Part-1-1
    3,    5,  644,  645,  646,  647
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*Elset, elset=Set-10, instance=Part-1-1, generate
 7501,  8000,     1
*Nset, nset=Set-11, instance=Part-1-1
    2,    4,    7,  632,  633,  634
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*Elset, elset=Set-11, instance=Part-1-1
   625,  1250,  1875,  2500,  3125,  3750
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*Nset, nset=Set-12, instance=Part-1-Copy-1
    1,    5,    6,    7, 1267, 1268
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*End Assembly
**
** MATERIALS
**
*Material, name=Material-1
*Density
1.,
*Depvar
      4,
*User Material, constants=1, type=THERMAL
0.,
*User Material, constants=8, type=MECHANICAL
 2.1e+11,   0.3, 0.004, 2700.,    1., 0.002,   0.4,    1.
*Material, name=Material-2
*Density
1.,
*User Material, constants=6, type=THERMAL
1000.,     0.002,     1e-08,     1e-15, 1.333e-06,     0.001
*User Material, constants=1, type=MECHANICAL
0.,
**
** BOUNDARY CONDITIONS
**
** Name: BC-Edge-Bottom-P1 Type: Displacement/Rotation
*Boundary
Set-10, 2, 2
** Name: BC-Edge-Left-P1 Type: Displacement/Rotation
*Boundary
Set-11, 1, 1
** Name: BC-Edge-Top-Right-P1 Type: Displacement/Rotation
*Boundary
Set-1, 1, 1
Set-1, 2, 2
** Name: BC-Edge-Top-Right-P2 Type: Temperature
*Boundary
Set-12, 11, 11
**
** PREDEFINED FIELDS
**
** Name: Predefined Field-1   Type: Temperature
*Initial Conditions, type=TEMPERATURE
Set-8, 1.
** ----------------------------------------------------------------
**
** STEP: Step-1
**
*Step, name=Step-1, nlgeom=NO, extrapolation=NO, amplitude=RAMP, inc=10000000, unsymm=NO
*Coupled Temperature-displacement, creep=none, deltmx=1e+08
0.1, 2000., 1e-50, 20.
*Solution Technique, type=SEPARATED
**
** BOUNDARY CONDITIONS
**
** Name: BC-6 Type: Displacement/Rotation
*Boundary
Set-6, 2, 2
** Name: BC-7 Type: Temperature
*Boundary
Set-7, 11, 11, 1.
** Name: BC-Notch-P2 Type: Temperature
*Boundary
Set-5, 11, 11, 1e+08
**
** CONTROLS
**
*Controls, reset
*Controls, parameters=time incrementation
100000, 1000000, 1000000, 1000000, 1000000, 1000000, 1000000, 1000000, 1000000, 10, 1000000
**
** OUTPUT REQUESTS
**
*Restart, write, frequency=100
**
** FIELD OUTPUT: F-Output-1
**
*Output, field
*Node Output
CF, RF, U
*Element Output, directions=YES
ESDV, LE, PE, PEEQ, PEMAG, S, SDV
**
** FIELD OUTPUT: F-Output-2
**
*Node Output
NT,
*Element Output, directions=YES
HFL, TEMP
*Radiation Output
FTEMP,
*Contact Output
HFLA, HTL, HTLA
**
** HISTORY OUTPUT: H-Output-1
**
*Output, history
*Node Output, nset=Notch
U1, U2, UT
*End Step
