*Heading
** Job name: SquarePlate-UMATHT-PhaseField-Hydrogen-s-C05 Model name: SquarePlate-UMATHT-PhaseField-Hydrogen-s-C05
** Generated by: Abaqus/CAE 2022
*Preprint, echo=NO, model=NO, history=NO, contact=NO
**
** PARTS
**
*Part, name=Part-1
*End Part
**
*Part, name=Part-1-Copy
*End Part
**
**
** ASSEMBLY
**
*Assembly, name=Assembly
**
*Instance, name=Part-1-1, part=Part-1
*Node
      1,           0.,          0.5
      2,          0.5,          0.5
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*Element, type=CPE8T
   1,   420,  7378,  7102,   419, 18567, 18568, 18569, 18570
   2,  7102,  7378,  7066,   547, 18568, 18571, 18572, 18573
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*Nset, nset=Set-1, generate
     1,  55528,      1
*Elset, elset=Set-1, generate
     1,  18397,      1
** Section: Section-1
*Solid Section, elset=Set-1, material=Material-1
,
*End Instance
**
*Instance, name=Part-1-Copy-1, part=Part-1-Copy
         1.1,           0.,           0.
*Node
      1,           0.,          0.5
      2,          0.5,          0.5
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*Element, type=CPE8T
   1,   420,  7378,  7102,   419, 18567, 18568, 18569, 18570
   2,  7102,  7378,  7066,   547, 18568, 18571, 18572, 18573
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*Nset, nset=Set-1, generate
     1,  55528,      1
*Elset, elset=Set-1, generate
     1,  18397,      1
** Section: Section-2
*Solid Section, elset=Set-1, material=Material-2
,
*End Instance
**
*Nset, nset=Set-1, instance=Part-1-1
     6,     7,   440,   441,   442,   443
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*Elset, elset=Set-1, instance=Part-1-1
  9519,  9545,  9546,  9576,  9577,  9578
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*Nset, nset=Set-2, instance=Part-1-1
 7,
*Nset, nset=Set-3, instance=Part-1-1
     4,     5,   363,   364,   365,   366
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*Elset, elset=Set-3, instance=Part-1-1
   15,   30,   31,   45,   60,   61
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*Nset, nset=Set-4, instance=Part-1-Copy-1, generate
     1,  55528,      1
*Elset, elset=Set-4, instance=Part-1-Copy-1, generate
     1,  18397,      1
*Nset, nset=Set-5, instance=Part-1-Copy-1
     1,     2,     3,     4,     5,     6
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*Elset, elset=Set-5, instance=Part-1-Copy-1
     1,     3,     4,     5,     6,     7
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*Nset, nset=Set-6, instance=Part-1-1
     1,     2,     8,     9,    10,    11
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*Elset, elset=Set-6, instance=Part-1-1
    16,    17,    32,    46,    62,    75
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*Nset, nset=Set-7, instance=Part-1-1
     1,     2,     8,     9,    10,    11
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*Elset, elset=Set-7, instance=Part-1-1
    16,    17,    32,    46,    62,    75
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*Nset, nset=Set-51, instance=Part-1-Copy-1
     1,     2,     3,     4,     5,     6
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*Elset, elset=Set-51, instance=Part-1-Copy-1
     1,     3,     4,     5,     6,     7
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*Nset, nset=Set-73, instance=Part-1-Copy-1, generate
     1,  55528,      1
*Elset, elset=Set-73, instance=Part-1-Copy-1, generate
     1,  18397,      1
*Nset, nset=Top, instance=Part-1-1
     4,     5,   363,   364,   365,   366
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*Elset, elset=Top, instance=Part-1-1
   15,   30,   31,   45,   60,   61
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*End Assembly
**
** MATERIALS
**
*Material, name=Material-1
*Density
1.,
*Depvar
      7,
*User Material, constants=2, type=THERMAL
 0.0075, 2.7
*User Material, constants=3, type=MECHANICAL
210000., 0.3,  1.
*Material, name=Material-2
*Density
1.,
*User Material, constants=1, type=THERMAL
 0.0127,
*User Material, constants=1, type=MECHANICAL
0.,
**
** BOUNDARY CONDITIONS
**
** Name: BC-Bottom-P1 Type: Displacement/Rotation
*Boundary
Set-1, 1, 1
Set-1, 2, 2
** Name: BC-Dis-P2 Type: Displacement/Rotation
*Boundary
Set-73, 1, 1
Set-73, 2, 2
Set-73, 6, 6
** Name: BC-ENV-P2 Type: Temperature
*Boundary
Set-51, 11, 11
**
** PREDEFINED FIELDS
**
** Name: Predefined Field-1   Type: Temperature
*Initial Conditions, type=TEMPERATURE
Set-4, 0.5
** ----------------------------------------------------------------
**
** STEP: Step-1
**
*Step, name=Step-1, nlgeom=NO, extrapolation=NO, amplitude=RAMP, inc=100000000, unsymm=NO
*Coupled Temperature-displacement, creep=none
1000., 1e+07,
*Solution Technique, type=SEPARATED
**
** BOUNDARY CONDITIONS
**
** Name: BC-ENV-P2 Type: Temperature
*Boundary
Set-51, 11, 11, 0.5
** Name: BC-Top-P1 Type: Displacement/Rotation
*Boundary
Set-3, 2, 2, 0.007
**
** CONTROLS
**
*Controls, reset
*Controls, parameters=time incrementation
50000, 50000, 50000, 50000, 50000, 50000, , , , ,
**
** OUTPUT REQUESTS
**
*Restart, write, frequency=0
**
** FIELD OUTPUT: F-Output-1
**
*Output, field, frequency=1
*Node Output
NT, U
*Element Output, directions=YES
S, SDV, TEMP
**
** HISTORY OUTPUT: H-Output-1
**
*Output, history
*Node Output, nset=Top
RF2, U2
*End Step
