*Heading
** Job name: Job-2 Model name: DST-pressure
** Generated by: Abaqus/CAE 2020
*Preprint, echo=NO, model=NO, history=NO, contact=NO
**
** PARTS
**
*Part, name=Part-1
*Node
      1,           0.,   35.5900002
      2,          50.,   35.5900002
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*Element, type=CPE4T
   1,   11,   12, 1366, 5320
   2, 5333, 5039,  334,  335
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*Nset, nset=Set-5, generate
     1,  22571,      1
*Elset, elset=Set-5, generate
     1,  22429,      1
** Section: Section-1
*Solid Section, elset=Set-5, material=Material-1
,
*End Part
**
**
** ASSEMBLY
**
*Assembly, name=Assembly
**
*Instance, name=Part-1-1, part=Part-1
*End Instance
**
*Node
      1,           0.,          50.,           0.
*Nset, nset=Set-27, instance=Part-1-1
   1,   4, 324, 325, 326, 327
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*Elset, elset=Set-27, instance=Part-1-1
    2,    4,    5,    7,    8,    9,   11,  315,  815,  816,  817,  818,  819, 1066, 1069, 5048
*Nset, nset=Set-28, instance=Part-1-1
   9,  10, 758, 759, 760, 761
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*Elset, elset=Set-28, instance=Part-1-1
 21016, 21030, 21043, 21061, 21063, 21088
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*Nset, nset=Set-29, instance=Part-1-1
   1,   4, 324, 325, 326, 327
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*Elset, elset=Set-29, instance=Part-1-1
    2,    4,    5,    7,    8,    9,   11,  315,  815,  816,  817,  818,  819, 1066, 1069, 5048
*Nset, nset=Set-30, instance=Part-1-1
   1,   2,  11,  12,  13,  14
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*Elset, elset=Set-30, instance=Part-1-1
     1,    21,    23,    24,    25,    26
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*Nset, nset=Set-31, instance=Part-1-1
   3,   4, 275, 276, 277, 278
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*Elset, elset=Set-31, instance=Part-1-1
   10,   11,   12,   34,   36,   37
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*Nset, nset=Set-32, instance=Part-1-1
   1,   2,   3,   4,   9,  10
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*Elset, elset=Set-32, instance=Part-1-1
     2,     4,     5,     7,     8,     9
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*Nset, nset=Set-45, instance=Part-1-1
   1,   4,   5, 324, 325, 326
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*Nset, nset=Set-47, instance=Part-1-1
   9,  10, 758, 759, 760, 761
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*Elset, elset=Set-47, instance=Part-1-1
 21016, 21030, 21043, 21061, 21063, 21088
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*Nset, nset=Set-48, instance=Part-1-1
   8,  10, 807, 808, 809, 810
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*Elset, elset=_Surf-2_S2, internal, instance=Part-1-1
  10,  36,  37, 109, 120, 121
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*Elset, elset=_Surf-2_S3, internal, instance=Part-1-1
   11,  273,  277,  280,  282,  284,  286,  289,  629, 4892
*Elset, elset=_Surf-2_S1, internal, instance=Part-1-1
   12,  199,  283,  810,  811, 4887, 4889, 4891, 4893, 5000, 5046
*Elset, elset=_Surf-2_S4, internal, instance=Part-1-1
   34,  142,  166,  177,  232,  248,  268, 4885
*Surface, type=ELEMENT, name=Surf-2
_Surf-2_S2, S2
_Surf-2_S3, S3
_Surf-2_S4, S4
_Surf-2_S1, S1
*End Assembly
**
** MATERIALS
**
*Material, name=Material-1
*Conductivity
1.,
*Depvar
     1,
*User Material, constants=10
25000.,  0.2,  0.2, 0.15,   0.,   0.,   3.,   2.
   0.,  -0.117851
**E=props(1) ! Young's modulus
**xnu=props(2) ! Poisson's ratio
**xl=props(3) ! Length scale
**Gc=props(4) ! Toughness
**kflagS=int(props(5)) ! Solution flag (0: monolithic, 1: staggered)
**kflagC=int(props(6)) ! Model (0:AT2, 1:AT1, 2:PF-CZM/linear, 3:PF-CZM/exp])
**kflagD=int(props(7)) ! Split (0: No split, 1: Amor, 2: Miehe, 3: Drucker-Prager based)
**kflagH=int(props(8)) ! Split linear momentum (1:Hybrid/no split, 2:Anisotropic)
**ft=props(9) ! Tensile strength (only relevant to kflagC=2 or kflagC=3)
**BDP=props(10) ! B parameter of Drucker-Prager model
**
** INTERACTION PROPERTIES
**
*Surface Interaction, name=IntProp-1
1.,
*Friction
0.,
*Surface Behavior, pressure-overclosure=HARD
**
** BOUNDARY CONDITIONS
**
** Name: BC-8 Type: Displacement/Rotation
*Boundary
Set-47, 2, 2
** Name: BC-9 Type: Displacement/Rotation
*Boundary
Set-48, 1, 1
** ----------------------------------------------------------------
**
** STEP: Step-1
**
*Step, name=Step-1, nlgeom=NO, extrapolation=NO, inc=1000000, unsymm=NO
*Coupled Temperature-displacement, creep=none, steady state
0.01, 1., 1e-50, 0.01
*Solution Technique, type=SEPARATED
**
** BOUNDARY CONDITIONS
**
** Name: BC-6 Type: Displacement/Rotation
*Boundary
Set-45, 1, 1, 0.15
**
** CONTROLS
**
*Controls, reset
*Controls, parameters=time incrementation
100000, 10000000, 10000000, 10000000, 10000000, 10000000, 10000000, 10000000, 10000000, 10, 10000000
**
** OUTPUT REQUESTS
**
*Restart, write, frequency=0
**
** FIELD OUTPUT: F-Output-1
**
*Output, field
*Node Output
NT, RF, U
*Element Output, directions=YES
E, EVOL, IVOL, S, SVOL, SDV
*Output, history, frequency=0
*End Step
