*Heading
** Job name: Job-2 Model name: Model-1
** Generated by: Abaqus/CAE 2018
*Preprint, echo=NO, model=NO, history=NO, contact=NO
**
** PARTS
**
*Part, name=Part-1
*End Part
**
*Part, name=Pin
*Node
      1,  -39.0450859,   11.8401699
      2,  -40.5067978,   10.8262625
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*Element, type=R2D2
 1,  1,  2
 2,  2,  3
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*End Part
**
**
** ASSEMBLY
**
*Assembly, name=Assembly
**
*Instance, name=Pin-2, part=Pin
   18.927187,         -20.,           0.
*End Instance
**
*Instance, name=Pin-1, part=Pin
   18.927187,          7.5,           0.
*End Instance
**
*Instance, name=Part-1-1, part=Part-1
*Node
      1,   32.6771889,           0.
      2,   6.26034594,           0.
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*Element, type=CPS8R
  1,  262,   26,   27,  549, 1254, 1255, 1256, 1257
  2,  418,   16,   17,  419, 1258, 1259, 1260, 1261
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*Nset, nset=Set-1, generate
    1,  3675,     1
*Elset, elset=Set-1, generate
    1,  1168,     1
** Section: Al2024 Section
*Solid Section, elset=Set-1, material=Material-1
20.,
*End Instance
**
*Node
      1,   -17.322813,        13.75,           0.
*Node
      2,   -17.322813,       -13.75,           0.
*Nset, nset=Set-12
 1,
*Nset, nset=Set-13
 2,
*Nset, nset=Set-23, instance=Part-1-1
    3,    4,   15,  201,  202,  203
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*Elset, elset=Set-23, instance=Part-1-1
   36,  437,  833,  834,  835,  836
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*Nset, nset=b_Set-8, instance=Pin-1, generate
  1,  22,   1
*Elset, elset=b_Set-8, instance=Pin-1, generate
  1,  22,   1
*Nset, nset=b_Set-10, instance=Pin-2, generate
  1,  22,   1
*Elset, elset=b_Set-10, instance=Pin-2, generate
  1,  22,   1
*Nset, nset=nCOD, instance=Part-1-1
 148,
*Nset, nset=_PickedSet31, internal
 1,
*Nset, nset=_PickedSet33, internal
 2,
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*Elset, elset=_CT1_S1, internal, instance=Part-1-1
 429, 465, 468, 482, 489, 490
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*Elset, elset=_CT1_S3, internal, instance=Part-1-1
 420, 423, 426, 436, 440, 461
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*Surface, type=ELEMENT, name=CT1
_CT1_S1, S1
_CT1_S3, S3
*Elset, elset=_CT2_S1, internal, instance=Part-1-1
 50, 87
*Elset, elset=_CT2_S2, internal, instance=Part-1-1
   6,   9,  13,  18,  19,  25
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*Elset, elset=_CT2_S4, internal, instance=Part-1-1
  8, 14, 24, 26, 43, 51, 62, 65, 75, 78, 79, 82, 84, 85, 86, 94
*Surface, type=ELEMENT, name=CT2
_CT2_S1, S1
_CT2_S2, S2
_CT2_S4, S4
*Elset, elset=_Pin1_SNEG, internal, instance=Pin-1, generate
  1,  22,   1
*Surface, type=ELEMENT, name=Pin1
_Pin1_SNEG, SNEG
*Elset, elset=_Pin2_SNEG, internal, instance=Pin-2, generate
  1,  22,   1
*Surface, type=ELEMENT, name=Pin2
_Pin2_SNEG, SNEG
*Elset, elset=_Surf-5_SNEG, internal, instance=Pin-1, generate
  1,  22,   1
*Surface, type=ELEMENT, name=Surf-5
_Surf-5_SNEG, SNEG
** Constraint: Pin1
*Rigid Body, ref node=_PickedSet31, elset=b_Set-8
** Constraint: Pin2
*Rigid Body, ref node=_PickedSet33, elset=b_Set-10
*End Assembly
**
** MATERIALS
**
*Material, name=Material-1
*Depvar
     9,
1, EE11, EE11
2, EE22, EE22
3, EE33, EE33
4, EE12, EE12
5, EP11, EP11
6, EP22, EP22
7, EP33, EP33
8, EP12, EP12
9, PEEQ, PEEQ
*User Material, constants=4
200000., 0.3, 600., 0.2
**
** INTERACTION PROPERTIES
**
*Surface Interaction, name=IntProp-1
1.,
**
** BOUNDARY CONDITIONS
**
** Name: Constraint1 Type: Displacement/Rotation
*Boundary
Set-12, 1, 1
Set-12, 6, 6
** Name: Constraint2 Type: Displacement/Rotation
*Boundary
Set-13, 1, 1
Set-13, 6, 6
**
** INTERACTIONS
**
** Interaction: C1
*Contact Pair, interaction=IntProp-1, type=SURFACE TO SURFACE
CT1, Pin1
** Interaction: C2
*Contact Pair, interaction=IntProp-1, type=SURFACE TO SURFACE
CT2, Pin2
** ----------------------------------------------------------------
**
** STEP: Step-1
**
*Step, name=Step-1, nlgeom=YES
*Static
1., 1., 1e-05, 1.
**
** BOUNDARY CONDITIONS
**
** Name: Contact1 Type: Displacement/Rotation
*Boundary
Set-12, 2, 2, 1e-05
** Name: Contact2 Type: Displacement/Rotation
*Boundary
Set-13, 2, 2, -1e-05
**
** OUTPUT REQUESTS
**
*Restart, write, frequency=0
*Output, field, frequency=0
**
** HISTORY OUTPUT: H-Output-1
**
*Output, history, variable=PRESELECT
*End Step
** ----------------------------------------------------------------
**
** STEP: Step-2
**
*Step, name=Step-2, nlgeom=YES, inc=100000
*Static
0.001, 1., 1e-20, 0.01
**
** BOUNDARY CONDITIONS
**
** Name: Load1 Type: Displacement/Rotation
*Boundary
Set-12, 2, 2, 1.
** Name: Load2 Type: Displacement/Rotation
*Boundary
Set-13, 2, 2, -1.
**
** OUTPUT REQUESTS
**
*Restart, write, frequency=0
**
** FIELD OUTPUT: F-Output-2
**
*Output, field
*Contact Output
CSDMG, CSMAXSCRT
**
** FIELD OUTPUT: F-Output-4
**
*Node Output
U,
*Element Output, directions=YES
S,
**
** FIELD OUTPUT: F-Output-3
**
*Node Output, nset=Set-12
RF,
**
** FIELD OUTPUT: F-Output-1
**
*Node Output, nset=nCOD
U,
**
** HISTORY OUTPUT: Force
**
*Output, history
*Node Output, nset=Set-12
RF2,
**
** HISTORY OUTPUT: Disp
**
*Node Output, nset=nCOD
U2,
**
** HISTORY OUTPUT: H-Output-1
**
*Output, history, variable=PRESELECT
*End Step
