*Heading
** Job name: Job-1 Model name: Bending
** Generated by: Abaqus/CAE 2016
*Preprint, echo=NO, model=NO, history=NO, contact=NO
**
** PARTS
**
*Part, name=Part-1
*End Part
**
**
** ASSEMBLY
**
*Assembly, name=Assembly
**
*Instance, name=Part-1-1, part=Part-1
          9.,          5.5,           0.
*Node
      1,           6.,          -5.
      2,    5.9000001,          -5.
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*Element, type=CPE8R
   1,    1,    2,  303,  302, 3312, 3313, 3314, 3315
   2,    2,    3,  304,  303, 3316, 3317, 3318, 3313
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*Nset, nset=Set-1, generate
    1,  9621,     1
*Elset, elset=Set-1, generate
    1,  3000,     1
** Section: Section-1
*Solid Section, elset=Set-1, material=Material-1
,
*End Instance
**
*Nset, nset=RightSide, instance=Part-1-1
    1,  302,  603,  904, 1205, 1506
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*Elset, elset=RightSide, instance=Part-1-1, generate
    1,  2701,   300
*Nset, nset=Set-1, instance=Part-1-1
    1,  302,  603,  904, 1205, 1506
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*Elset, elset=Set-1, instance=Part-1-1, generate
    1,  2701,   300
*Nset, nset=Set-2, instance=Part-1-1
  301,  602,  903, 1204, 1505, 1806
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*Elset, elset=Set-2, instance=Part-1-1, generate
  300,  3000,   300
*Nset, nset=Utop, instance=Part-1-1
 1,
*End Assembly
**
** MATERIALS
**
*Material, name=Material-1
*Depvar
     15,
1, EE11, EE11
2, EE22, EE22
3, EE33, EE33
4, EE12, EE12
5, EP11, EP11
6, EP22, EP22
7, EP33, EP33
8, EP12, EP12
9, PEEQ, PEEQ
10, EQGRAD, EQGRAD
11, SSD, SSD
12, GND, GND
13, TD, TD
14, DPEEQ, DPEEQ
15, DTD, DTD
*User Material, constants=6
200000.,   0.3,  400., 0.25,   0.2,    1.
** ----------------------------------------------------------------
**
** STEP: Step-1
**
*Step, name=Step-1, nlgeom=NO, inc=10000
*Static
0.001, 1., 1e-20, 0.001
**
** BOUNDARY CONDITIONS
**
** Name: BC-1 Type: Displacement/Rotation Using Analytical Field: AnalyticalField-1
*Boundary
Part-1-1.1, 1, 1, 1.125
Part-1-1.302, 1, 1, 0.9
Part-1-1.603, 1, 1, 0.675
Part-1-1.904, 1, 1, 0.45
Part-1-1.1205, 1, 1, 0.225
Part-1-1.1506, 1, 1
Part-1-1.1807, 1, 1, -0.225
Part-1-1.2108, 1, 1, -0.45
Part-1-1.2409, 1, 1, -0.675
Part-1-1.2710, 1, 1, -0.9
Part-1-1.3011, 1, 1, -1.125
Part-1-1.3315, 1, 1, 1.0125
Part-1-1.4215, 1, 1, 0.787501
Part-1-1.4816, 1, 1, 0.5625
Part-1-1.5417, 1, 1, 0.337499
Part-1-1.6018, 1, 1, 0.1125
Part-1-1.6619, 1, 1, -0.1125
Part-1-1.7220, 1, 1, -0.337499
Part-1-1.7821, 1, 1, -0.5625
Part-1-1.8422, 1, 1, -0.787501
Part-1-1.9023, 1, 1, -1.0125
** Name: BC-2 Type: Displacement/Rotation Using Analytical Field: AnalyticalField-1
*Boundary
Part-1-1.301, 1, 1, -1.125
Part-1-1.602, 1, 1, -0.9
Part-1-1.903, 1, 1, -0.675
Part-1-1.1204, 1, 1, -0.45
Part-1-1.1505, 1, 1, -0.225
Part-1-1.1806, 1, 1
Part-1-1.2107, 1, 1, 0.225
Part-1-1.2408, 1, 1, 0.45
Part-1-1.2709, 1, 1, 0.675
Part-1-1.3010, 1, 1, 0.9
Part-1-1.3311, 1, 1, 1.125
Part-1-1.4211, 1, 1, -1.0125
Part-1-1.4812, 1, 1, -0.787501
Part-1-1.5413, 1, 1, -0.5625
Part-1-1.6014, 1, 1, -0.337499
Part-1-1.6615, 1, 1, -0.1125
Part-1-1.7216, 1, 1, 0.1125
Part-1-1.7817, 1, 1, 0.337499
Part-1-1.8418, 1, 1, 0.5625
Part-1-1.9019, 1, 1, 0.787501
Part-1-1.9620, 1, 1, 1.0125
**
** OUTPUT REQUESTS
**
*Restart, write, frequency=0
**
** FIELD OUTPUT: F-Output-1
**
*Output, field, frequency=100
*Node Output
CF, RF, RM, U
*Element Output, directions=YES
LE, PE, PEEQ, PEMAG, S, SDV
**
** HISTORY OUTPUT: H-Output-2
**
*Output, history
*Node Output, nset=RightSide
COOR2, RF1
**
** HISTORY OUTPUT: H-Output-3
**
*Node Output, nset=Utop
U1,
*End Step
