*Heading
** Job name: SENT Model name: SENT
** Generated by: Abaqus/CAE 2018
*Preprint, echo=NO, model=NO, history=NO, contact=NO
**
** PARTS
**
*Part, name=Part-1
*End Part
**
**
** ASSEMBLY
**
*Assembly, name=Assembly
**
*Instance, name=Part-1-1, part=Part-1
*Node
      1, -0.0500000007,           0.
      2, -0.0500000007, -0.0500000007
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*Element, type=CPE4T, elset=Visualization
   1, 8614,   13,  596, 8613
   2,   13,   14,  597,  596
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*Nset, nset=Set-1, generate
    1,  8636,     1
*Elset, elset=Set-1, generate
    1,  8532,     1
** Section: Section-1
*Solid Section, elset=Visualization, material=Material-1
,
*End Instance
**
*Nset, nset=Bottom, instance=Part-1-1
  11,  12, 553, 554, 555, 556
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*Elset, elset=Bottom, instance=Part-1-1
 6090, 6091, 6113, 6114, 6150, 6153
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*Nset, nset=Crack, instance=Part-1-1
    1,    4,   10,  174,  175,  176
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*Elset, elset=Crack, instance=Part-1-1
    1,   14,   27,   40,   53,   66
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*Nset, nset=Right, instance=Part-1-1
   12
*Nset, nset=Top, instance=Part-1-1
   8,   9, 495, 496, 497, 498
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*Elset, elset=Top, instance=Part-1-1
 3610, 3611, 3626, 3627, 3628, 3678
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*Nset, nset=All, instance=Part-1-1, generate
    1,  8636,     1
*Elset, elset=All, instance=Part-1-1, generate
    1,  8532,     1
*End Assembly
**
** MATERIALS
**
*Material, name=Material-1
*Conductivity
1.,
*Depvar
     7,
1,   H,   H
*User Material, constants=9
210000., 0.3, 0.024, 2.7, 0, 0, 0, 1,
50
**E=props(1) ! Young's modulus
**xnu=props(2) ! Poisson's ratio
**xl=props(3) ! Length scale
**Gc=props(4) ! Toughness
**kflagS=int(props(5)) ! Solution flag (0: monolithic, 1: staggered)
**kflagC=int(props(6)) ! Model (0:AT2, 1:AT1, 2:PF-CZM/linear, 3:PF-CZM/exp])
**kflagD=int(props(7)) ! Split (0: No split, 1: Amor, 2: Miehe)
**kflagH=int(props(8)) ! Split linear momentum (1:Hybrid/no split, 2:Anisotropic [only for kflagD=2])
**ft=props(9) ! Tensile strength (only relevant to kflagC=2 or kflagC=3)
*Heat Generation
**
** PREDEFINED FIELDS
**
** Name: Predefined Field-1   Type: Temperature
*Initial Conditions, type=TEMPERATURE
All, 0.
**
** BOUNDARY CONDITIONS
** Name: BC-1 Type: Displacement/Rotation
*Boundary
Right, 1, 1
Bottom, 2, 2
** STEP: Step-1
**
*Step, name=Step-1, nlgeom=NO, extrapolation=NO, inc=10000, unsymm=NO
*Coupled Temperature-displacement, creep=none, steady state
0.01, 1., 0.01, 0.01
*Solution Technique, type=SEPARATED
*Controls, reset
*Controls, parameters=time incrementation
5000, 5000, 5000, 5000, 5000, 5000, , , , ,
*Boundary
Top, 2, 2, 0.01
**
*Restart, write, frequency=0
**
** FIELD OUTPUT: F-Output-1
**
*Output, field, frequency=1
*Node Output
U, NT
*Element Output, directions=YES
SDV
**
** HISTORY OUTPUT: H-Output-1
**
*Output, history, frequency=1
*Node Output, nset=Top
RF2, U2
*End Step
