*Heading
** Job name: mechanical Model name: mechanical
** Generated by: Abaqus/CAE 2022
*Preprint, echo=NO, model=NO, history=NO, contact=NO
**
** PARTS
**
*Part, name=Part-1
*Node
      1,           5.,          10.
      2,           5.,          15.
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*Element, type=CPE8R
 1,   1,   7, 115,  22, 307, 308, 309, 310
 2,   7,   8, 116, 115, 311, 312, 313, 308
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*Nset, nset=Base
   1,   2,   5,   6,   7,   8
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*Elset, elset=Base, generate
  26,  250,    1
*Nset, nset=Weld
   1,   2,   3,   4,   7,   8
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*Elset, elset=Weld, generate
  1,  25,   1
** Section: Weld
*Solid Section, elset=Weld, material=Weld
,
** Section: Base
*Solid Section, elset=Base, material=Base
,
*End Part
**
**
** ASSEMBLY
**
*Assembly, name=Assembly
**
*Instance, name=Part-1-1, part=Part-1
*End Instance
**
*Nset, nset=All, instance=Part-1-1, generate
   1,  861,    1
*Elset, elset=All, instance=Part-1-1, generate
   1,  250,    1
*Nset, nset=Fusionline, instance=Part-1-1
   1,   2,   7,   8,   9,  10, 307, 311, 314, 317, 320
*Elset, elset=Fusionline, instance=Part-1-1
  1,  2,  3,  4,  5, 26, 27, 28, 29, 30
*Nset, nset=Set-3, instance=Part-1-1
   3,   4,   5,   6,  15,  16
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*Elset, elset=Set-3, instance=Part-1-1
  21,  22,  23,  24,  25, 246, 247, 248, 249, 250
*Nset, nset=Set-4, instance=Part-1-1
 5,
*Elset, elset=_Surf-1_S2, internal, instance=Part-1-1, generate
   5,  250,    5
*Elset, elset=_Surf-1_S3, internal, instance=Part-1-1
  21,  22,  23,  24,  25, 246, 247, 248, 249, 250
*Elset, elset=_Surf-1_S4, internal, instance=Part-1-1, generate
   1,  246,    5
*Surface, type=ELEMENT, name=Surf-1
_Surf-1_S2, S2
_Surf-1_S3, S3
_Surf-1_S4, S4
*End Assembly
**
** MATERIALS
**
*Material, name=Base
*Depvar
     30,
1, THE, THE
2, PEEQ, PEEQ
3, PPEEQ, PPEEQ
4, TPEEQ, TPEEQ
5, PE11, PE11
6, PE22, PE22
7, PE33, PE33
8, PE12, PE12
9, PPE11, PE11
10, PPE22, PE22
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30, PEEQT, PEEQT
*Expansion, user
*User Material, constants=1
0.,
*Material, name=Weld
*Depvar
     30,
1, THE, THE
2, PEEQ, PEEQ
3, PPEEQ, PPEEQ
4, TPEEQ, TPEEQ
5, PE11, PE11
6, PE22, PE22
7, PE33, PE33
8, PE12, PE12
9, PPE11, PE11
10, PPE22, PE22
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30, PEEQT, PEEQT
*Expansion, user
*User Material, constants=1
0.,
**
** PHYSICAL CONSTANTS
**
*Physical Constants, absolute zero=-273., stefan boltzmann=5.67e-14
**
** BOUNDARY CONDITIONS
**
** Name: FixX Type: Displacement/Rotation
*Boundary
Set-3, 1, 1
** Name: FixY Type: Displacement/Rotation
*Boundary
Set-4, 2, 2
**
** PREDEFINED FIELDS
**
** Name: frac_a   Type: Field
*Initial Conditions, type=FIELD, variable=5, file=thermal_a.odb, step=1, inc=0, output variable=NT
** Name: frac_b   Type: Field
*Initial Conditions, type=FIELD, variable=3, file=thermal_b.odb, step=1, inc=0, output variable=NT
** Name: frac_f   Type: Field
*Initial Conditions, type=FIELD, variable=1, file=thermal_f.odb, step=1, inc=0, output variable=NT
** Name: frac_m   Type: Field
*Initial Conditions, type=FIELD, variable=4, file=thermal_m.odb, step=1, inc=0, output variable=NT
** Name: frac_p   Type: Field
*Initial Conditions, type=FIELD, variable=2, file=thermal_p.odb, step=1, inc=0, output variable=NT
** Name: temperature   Type: Temperature
*Initial Conditions, type=TEMPERATURE, file=thermal.odb, step=1, inc=0
** ----------------------------------------------------------------
**
** STEP: Step-1 Initialization
**
*Step, name="Step-1 Initialization", nlgeom=NO
*Static
1., 1., 1e-05, 1.
**
** INTERACTIONS
**
** Interaction: Weld
*Model Change, remove
Part-1-1.Weld,
**
** OUTPUT REQUESTS
**
*Restart, write, frequency=0
**
** FIELD OUTPUT: F-Output-1
**
*Output, field
*Node Output
U,
*Element Output, directions=YES
E, S, SDV
**
** HISTORY OUTPUT: H-Output-1
**
*Output, history, variable=PRESELECT
*End Step
** ----------------------------------------------------------------
**
** STEP: Step-2 Heating
**
*Step, name="Step-2 Heating", nlgeom=NO, inc=1000
*Static
0.01, 1., 1e-05, 0.01
**
** PREDEFINED FIELDS
**
** Name: frac_a   Type: Field
*Field, variable=5, file=thermal_a.odb, output variable=NT, bstep=2
** Name: frac_b   Type: Field
*Field, variable=3, file=thermal_b.odb, output variable=NT, bstep=2
** Name: frac_f   Type: Field
*Field, variable=1, file=thermal_f.odb, output variable=NT, bstep=2
** Name: frac_m   Type: Field
*Field, variable=4, file=thermal_m.odb, output variable=NT, bstep=2
** Name: frac_p   Type: Field
*Field, variable=2, file=thermal_p.odb, output variable=NT, bstep=2
** Name: temperature   Type: Temperature
*Temperature, file=thermal.odb, bstep=2
**
** OUTPUT REQUESTS
**
*Restart, write, frequency=0
**
** FIELD OUTPUT: F-Output-1
**
*Output, field
*Node Output
U,
*Element Output, directions=YES
E, S, SDV
**
** HISTORY OUTPUT: H-Output-1
**
*Output, history, variable=PRESELECT
*End Step
** ----------------------------------------------------------------
**
** STEP: Step-3 Insert
**
*Step, name="Step-3 Insert", nlgeom=NO
*Static
1., 1., 1e-05, 1.
**
** PREDEFINED FIELDS
**
** Name: frac_a   Type: Field
*Field, variable=5, file=thermal_a.odb, output variable=NT, bstep=3
** Name: frac_b   Type: Field
*Field, variable=3, file=thermal_b.odb, output variable=NT, bstep=3
** Name: frac_f   Type: Field
*Field, variable=1, file=thermal_f.odb, output variable=NT, bstep=3
** Name: frac_m   Type: Field
*Field, variable=4, file=thermal_m.odb, output variable=NT, bstep=3
** Name: frac_p   Type: Field
*Field, variable=2, file=thermal_p.odb, output variable=NT, bstep=3
** Name: temperature   Type: Temperature
*Temperature, file=thermal.odb, bstep=3
**
** INTERACTIONS
**
** Interaction: Weld
*Model Change, add
Part-1-1.Weld,
**
** OUTPUT REQUESTS
**
*Restart, write, frequency=0
**
** FIELD OUTPUT: F-Output-1
**
*Output, field
*Node Output
U,
*Element Output, directions=YES
E, S, SDV
**
** HISTORY OUTPUT: H-Output-1
**
*Output, history, variable=PRESELECT
*End Step
** ----------------------------------------------------------------
**
** STEP: Step-4 Cooldown
**
*Step, name="Step-4 Cooldown", nlgeom=NO, inc=1000
*Static
0.01, 1., 1e-05, 0.01
**
** PREDEFINED FIELDS
**
** Name: frac_a   Type: Field
*Field, variable=5, file=thermal_a.odb, output variable=NT, bstep=4
** Name: frac_b   Type: Field
*Field, variable=3, file=thermal_b.odb, output variable=NT, bstep=4
** Name: frac_f   Type: Field
*Field, variable=1, file=thermal_f.odb, output variable=NT, bstep=4
** Name: frac_m   Type: Field
*Field, variable=4, file=thermal_m.odb, output variable=NT, bstep=4
** Name: frac_p   Type: Field
*Field, variable=2, file=thermal_p.odb, output variable=NT, bstep=4
** Name: temperature   Type: Temperature
*Temperature, file=thermal.odb, bstep=4
**
** OUTPUT REQUESTS
**
*Restart, write, frequency=0
**
** FIELD OUTPUT: F-Output-1
**
*Output, field
*Node Output
U,
*Element Output, directions=YES
E, S, SDV
**
** HISTORY OUTPUT: H-Output-1
**
*Output, history, variable=PRESELECT
*End Step
