*Heading
** Job name: thermal Model name: thermal
** Generated by: Abaqus/CAE 2022
*Preprint, echo=NO, model=NO, history=NO, contact=NO
**
** PARTS
**
*Part, name=Part-1
*Node
      1,           5.,          10.
      2,           5.,          15.
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*Element, type=DC2D8
 1,   1,   7, 115,  22, 307, 308, 309, 310
 2,   7,   8, 116, 115, 311, 312, 313, 308
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*Nset, nset=Base
   1,   2,   5,   6,   7,   8
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*Elset, elset=Base, generate
  26,  250,    1
*Nset, nset=Weld
   1,   2,   3,   4,   7,   8
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*Elset, elset=Weld, generate
  1,  25,   1
** Section: Weld
*Solid Section, elset=Weld, material=Weld
,
** Section: Base
*Solid Section, elset=Base, material=Base
,
*End Part
**
**
** ASSEMBLY
**
*Assembly, name=Assembly
**
*Instance, name=Part-1-1, part=Part-1
*End Instance
**
*Nset, nset=All, instance=Part-1-1, generate
   1,  861,    1
*Elset, elset=All, instance=Part-1-1, generate
   1,  250,    1
*Nset, nset=Fusionline, instance=Part-1-1
   1,   2,   7,   8,   9,  10, 307, 311, 314, 317, 320
*Elset, elset=Fusionline, instance=Part-1-1
  1,  2,  3,  4,  5, 26, 27, 28, 29, 30
*Elset, elset=_Surf-1_S2, internal, instance=Part-1-1, generate
   5,  250,    5
*Elset, elset=_Surf-1_S3, internal, instance=Part-1-1
  21,  22,  23,  24,  25, 246, 247, 248, 249, 250
*Elset, elset=_Surf-1_S4, internal, instance=Part-1-1, generate
   1,  246,    5
*Surface, type=ELEMENT, name=Surf-1
_Surf-1_S2, S2
_Surf-1_S3, S3
_Surf-1_S4, S4
*End Assembly
**
** MATERIALS
**
*Material, name=Base
*Density
1.,
*Depvar
     12,
1, Xf, XF
2, XP, XP
3, XB, XB
4, XM, XM
5, XA, XA
6, GSIZE, GSIZE
7, GGROW, GGROW
8, NUCF, NUCF
9, NUCP, NUCP
10, NUCB, NUCB
11, DT700, DT700
12, TMAX, TMAX
*User Defined Field
*User Material, constants=1, type=THERMAL
0.,
*Material, name=Weld
*Density
1.,
*Depvar
     12,
1, Xf, XF
2, XP, XP
3, XB, XB
4, XM, XM
5, XA, XA
6, GSIZE, GSIZE
7, GGROW, GGROW
8, NUCF, NUCF
9, NUCP, NUCP
10, NUCB, NUCB
11, DT700, DT700
12, TMAX, TMAX
*User Defined Field
*User Material, constants=1, type=THERMAL
0.,
**
** PHYSICAL CONSTANTS
**
*Physical Constants, absolute zero=-273., stefan boltzmann=5.67e-14
**
** PREDEFINED FIELDS
**
** Name: Ferrite fraction   Type: Field
*Initial Conditions, type=FIELD, variable=1
Part-1-1.Base, 1.
** Name: Grain size   Type: Field
*Initial Conditions, type=FIELD, variable=6
Part-1-1.Base, 20.
** Name: Hardness   Type: Field
*Initial Conditions, type=FIELD, variable=7
All, 150.
** Name: Pearlite fraction   Type: Field
*Initial Conditions, type=FIELD, variable=2
Part-1-1.Base, 1.
** Name: Temperature 1 Weld   Type: Temperature
*Initial Conditions, type=TEMPERATURE
Part-1-1.Weld, 1500.
** Name: Temperature 2 Base   Type: Temperature
*Initial Conditions, type=TEMPERATURE
Part-1-1.Base, 20.
** ----------------------------------------------------------------
**
** STEP: Step-1 Initialization
**
*Step, name="Step-1 Initialization", nlgeom=NO
*Heat Transfer, end=PERIOD, deltmx=50.
1e-07, 1e-07, 1e-12, 1e-07,
**
** INTERACTIONS
**
** Interaction: Weld
*Model Change, remove
Part-1-1.Weld,
** Interaction: Convection
*Sfilm
Surf-1, F, 20., 2.5e-05
** Interaction: Radiation
*Sradiate
Surf-1, R, 20., 0.8
**
** OUTPUT REQUESTS
**
*Restart, write, frequency=0
**
** FIELD OUTPUT: F-Output-1
**
*Output, field
*Node Output
NT,
*Element Output, position=AVERAGED AT NODES, directions=YES
FV, SDV
*Output, history, frequency=0
*End Step
** ----------------------------------------------------------------
**
** STEP: Step-2 Heating
**
*Step, name="Step-2 Heating", nlgeom=NO, amplitude=RAMP, inc=10000
*Heat Transfer, end=PERIOD, deltmx=50.
0.03, 3., 3e-05, 0.03,
**
** BOUNDARY CONDITIONS
**
** Name: BC-1 Type: Temperature
*Boundary
Fusionline, 11, 11, 1500.
**
** OUTPUT REQUESTS
**
*Restart, write, frequency=0
**
** FIELD OUTPUT: F-Output-1
**
*Output, field
*Node Output
NT,
*Element Output, position=AVERAGED AT NODES, directions=YES
FV, SDV
*Output, history, frequency=0
*End Step
** ----------------------------------------------------------------
**
** STEP: Step-3 Insert
**
*Step, name="Step-3 Insert", nlgeom=NO
*Heat Transfer, end=PERIOD, deltmx=50.
1e-07, 1e-07, 1e-12, 1e-07,
**
** INTERACTIONS
**
** Interaction: Weld
*Model Change, add
Part-1-1.Weld,
**
** OUTPUT REQUESTS
**
*Restart, write, frequency=0
**
** FIELD OUTPUT: F-Output-1
**
*Output, field
*Node Output
NT,
*Element Output, position=AVERAGED AT NODES, directions=YES
FV, SDV
*Output, history, frequency=0
*End Step
** ----------------------------------------------------------------
**
** STEP: Step-4 Cooldown
**
*Step, name="Step-4 Cooldown", nlgeom=NO, inc=1000
*Heat Transfer, end=PERIOD, deltmx=50.
0.01, 120., 3e-07, 1.2,
**
** BOUNDARY CONDITIONS
**
** Name: BC-1 Type: Temperature
*Boundary, op=NEW
**
** OUTPUT REQUESTS
**
*Restart, write, frequency=0
**
** FIELD OUTPUT: F-Output-1
**
*Output, field
*Node Output
NT,
*Element Output, position=AVERAGED AT NODES, directions=YES
FV, SDV
*Output, history, frequency=0
*End Step
