*Heading
** Job name: mechanical Model name: mechanical
** Generated by: Abaqus/CAE 2022
*Preprint, echo=NO, model=NO, history=NO, contact=NO
**
** PARTS
**
*Part, name=Part-1
*Node
      1,   41.3793106,   378.746277
      2,          40.,   366.121429
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*Element, type=CPE8R
   1,     1,    21,  3396,  2060, 28419, 28420, 28421, 28422
   2,    21,    22,  3397,  3396, 28423, 28424, 28425, 28420
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*Nset, nset=All, generate
     1,  83837,      1
*Elset, elset=All, generate
     1,  27001,      1
*Nset, nset=edge_seeds_bias
     1,     2,     4,     6,     7,     8
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*Elset, elset=edge_seeds_bias
 6937, 6941, 6943, 6945, 6946, 6958
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*Nset, nset=edge_seeds_fine
     7,     8,     9,    10,    11,    12
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*Elset, elset=edge_seeds_fine
  7742,  7743,  7744,  7745,  7746,  7747
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*Nset, nset=edge_seeds_coarse
     1,     2,     3,     4,     5,     6
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*Elset, elset=edge_seeds_coarse, generate
    1,  6936,     1
*Nset, nset=Base
     1,     2,     3,     4,     5,     6
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*Elset, elset=Base
     1,     2,     3,     4,     5,     6
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*Nset, nset=Weld
     9,    10,    13,    14,    15,    16
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*Elset, elset=Weld
  7742,  7743,  7744,  7745,  7746,  7747
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*Nset, nset=Weld1
     9,    10,    16,    17,    18,    19
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*Elset, elset=Weld1
  7742,  7743,  7744,  7745,  7746,  7747
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*Nset, nset=Weld2
    13,    14,    15,    16,    18,    20
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*Elset, elset=Weld2
  9229,  9230,  9231,  9232,  9233,  9234
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** Section: Section-1
*Solid Section, elset=All, material=UMAT
,
*End Part
**
**
** ASSEMBLY
**
*Assembly, name=Assembly
**
*Instance, name=Part-1-1, part=Part-1
*End Instance
**
*Nset, nset=fix-xy, instance=Part-1-1
 3,
*Nset, nset=fix-y, instance=Part-1-1
 5,
*Elset, elset=_outer_cooldown1_S2, internal, instance=Part-1-1
     6,    12,    18,    24,    30,    36
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*Elset, elset=_outer_cooldown1_S4, internal, instance=Part-1-1
     1,     7,    13,    19,    25,    31
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*Elset, elset=_outer_cooldown1_S1, internal, instance=Part-1-1
  6937,  6943,  6945,  7020,  7066,  7085
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*Elset, elset=_outer_cooldown1_S3, internal, instance=Part-1-1
  6941,  6946,  6958,  7014,  7019,  7028
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*Surface, type=ELEMENT, name=outer_cooldown1
_outer_cooldown1_S2, S2
_outer_cooldown1_S4, S4
_outer_cooldown1_S1, S1
_outer_cooldown1_S3, S3
*Elset, elset=_outer_cooldown2_S2, internal, instance=Part-1-1
     6,    12,    18,    24,    30,    36
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*Elset, elset=_outer_cooldown2_S4, internal, instance=Part-1-1
     1,     7,    13,    19,    25,    31
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*Elset, elset=_outer_cooldown2_S1, internal, instance=Part-1-1
  6937,  6943,  6945,  7020,  7066,  7085
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*Elset, elset=_outer_cooldown2_S3, internal, instance=Part-1-1
  6941,  6946,  6958,  7014,  7019,  7028
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*Surface, type=ELEMENT, name=outer_cooldown2
_outer_cooldown2_S2, S2
_outer_cooldown2_S4, S4
_outer_cooldown2_S1, S1
_outer_cooldown2_S3, S3
*Elset, elset=_outer_heating1_S2, internal, instance=Part-1-1
     6,    12,    18,    24,    30,    36
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*Elset, elset=_outer_heating1_S4, internal, instance=Part-1-1
     1,     7,    13,    19,    25,    31
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*Elset, elset=_outer_heating1_S1, internal, instance=Part-1-1
  6937,  6943,  6945,  7020,  7066,  7085
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*Elset, elset=_outer_heating1_S3, internal, instance=Part-1-1
  6941,  6946,  6958,  7014,  7019,  7028
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*Surface, type=ELEMENT, name=outer_heating1
_outer_heating1_S2, S2
_outer_heating1_S4, S4
_outer_heating1_S1, S1
_outer_heating1_S3, S3
*Elset, elset=_outer_heating2_S2, internal, instance=Part-1-1
     6,    12,    18,    24,    30,    36
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*Elset, elset=_outer_heating2_S4, internal, instance=Part-1-1
     1,     7,    13,    19,    25,    31
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*Elset, elset=_outer_heating2_S1, internal, instance=Part-1-1
  6937,  6943,  6945,  7020,  7066,  7085
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*Elset, elset=_outer_heating2_S3, internal, instance=Part-1-1
  6941,  6946,  6958,  7014,  7019,  7028
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*Surface, type=ELEMENT, name=outer_heating2
_outer_heating2_S2, S2
_outer_heating2_S4, S4
_outer_heating2_S1, S1
_outer_heating2_S3, S3
*End Assembly
*Amplitude, name=Constant
             0.,              1.,              1.,              1.
**
** MATERIALS
**
*Material, name=UMAT
*Depvar
     30,
1, THE, THE
2, PEEQ, PEEQ
3, PPEEQ, PPEEQ
4, TPEEQ, TPEEQ
5, PE11, PE11
6, PE22, PE22
7, PE33, PE33
8, PE12, PE12
9, PPE11, PE11
10, PPE22, PE22
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30, PEEQT, PEEQT
*Expansion, user
*User Material, constants=1
0.,
*Time Points, name=TimePoints-1, GENERATE
0.25, 2., 0.25
2.5, 5., 0.5
6., 10., 1.
12., 20., 2.
25., 50., 5.
60., 100., 10.
130., 600., 30.
**
** PHYSICAL CONSTANTS
**
*Physical Constants, absolute zero=-273.15, stefan boltzmann=5.67e-14
**
** BOUNDARY CONDITIONS
**
** Name: BC-1 Type: Displacement/Rotation
*Boundary
fix-xy, 1, 1
fix-xy, 2, 2
** Name: BC-2 Type: Displacement/Rotation
*Boundary
fix-y, 2, 2
**
** PREDEFINED FIELDS
**
** Name: Temperature   Type: Temperature
*Initial Conditions, type=TEMPERATURE, file=../thermal/thermal.odb, step=1, inc=0
** Name: frac_a   Type: Field
*Initial Conditions, type=FIELD, variable=5, file=../thermal/thermal_a.odb, step=1, inc=0, output variable=nt
** Name: frac_b   Type: Field
*Initial Conditions, type=FIELD, variable=3, file=../thermal/thermal_b.odb, step=1, inc=0, output variable=nt
** Name: frac_f   Type: Field
*Initial Conditions, type=FIELD, variable=1, file=../thermal/thermal_f.odb, step=1, inc=0, output variable=nt
** Name: frac_m   Type: Field
*Initial Conditions, type=FIELD, variable=4, file=../thermal/thermal_m.odb, step=1, inc=0, output variable=nt
** Name: frac_p   Type: Field
*Initial Conditions, type=FIELD, variable=2, file=../thermal/thermal_p.odb, step=1, inc=0, output variable=nt
** ----------------------------------------------------------------
**
** STEP: Step1_Initial
**
*Step, name=Step1_Initial, nlgeom=NO
*Static, direct
1., 1.,
**
** PREDEFINED FIELDS
**
** Name: Temperature   Type: Temperature
*Temperature, file=../thermal/thermal.odb, bstep=1, binc=1
** Name: frac_a   Type: Field
*Field, variable=5, file=../thermal/thermal_a.odb, output variable=nt, bstep=1, binc=1
** Name: frac_b   Type: Field
*Field, variable=3, file=../thermal/thermal_b.odb, output variable=nt, bstep=1, binc=1
** Name: frac_f   Type: Field
*Field, variable=1, file=../thermal/thermal_f.odb, output variable=nt, bstep=1, binc=1
** Name: frac_m   Type: Field
*Field, variable=4, file=../thermal/thermal_m.odb, output variable=nt, bstep=1, binc=1
** Name: frac_p   Type: Field
*Field, variable=2, file=../thermal/thermal_p.odb, output variable=nt, bstep=1, binc=1
**
** INTERACTIONS
**
** Interaction: Weld1
*Model Change, remove
Part-1-1.Weld1,
** Interaction: Weld2
*Model Change, remove
Part-1-1.Weld2,
**
** OUTPUT REQUESTS
**
*Restart, write, frequency=0
**
** FIELD OUTPUT: F-Output-1
**
*Output, field, frequency=99999
*Node Output
U,
*Element Output, directions=YES
E, FV, S, SDV
*Output, history, frequency=0
*End Step
** ----------------------------------------------------------------
**
** STEP: Step2_Heating1
**
*Step, name=Step2_Heating1, nlgeom=NO, inc=100000
*Static
0.005, 1., 1e-10, 0.005
**
** PREDEFINED FIELDS
**
** Name: Temperature   Type: Temperature
*Temperature, file=../thermal/thermal.odb, bstep=2, binc=1
** Name: frac_a   Type: Field
*Field, variable=5, file=../thermal/thermal_a.odb, output variable=nt, bstep=2, binc=1
** Name: frac_b   Type: Field
*Field, variable=3, file=../thermal/thermal_b.odb, output variable=nt, bstep=2, binc=1
** Name: frac_f   Type: Field
*Field, variable=1, file=../thermal/thermal_f.odb, output variable=nt, bstep=2, binc=1
** Name: frac_m   Type: Field
*Field, variable=4, file=../thermal/thermal_m.odb, output variable=nt, bstep=2, binc=1
** Name: frac_p   Type: Field
*Field, variable=2, file=../thermal/thermal_p.odb, output variable=nt, bstep=2, binc=1
**
** OUTPUT REQUESTS
**
*Restart, write, frequency=0
**
** FIELD OUTPUT: F-Output-1
**
*Output, field, number interval=5
*Node Output
U,
*Element Output, directions=YES
E, FV, S, SDV
*Output, history, frequency=0
*End Step
** ----------------------------------------------------------------
**
** STEP: Step3_Insert1
**
*Step, name=Step3_Insert1, nlgeom=NO
*Static, direct
1., 1.,
**
** PREDEFINED FIELDS
**
** Name: Temperature   Type: Temperature
*Temperature, file=../thermal/thermal.odb, bstep=3, binc=1
** Name: frac_a   Type: Field
*Field, variable=5, file=../thermal/thermal_a.odb, output variable=nt, bstep=3, binc=1
** Name: frac_b   Type: Field
*Field, variable=3, file=../thermal/thermal_b.odb, output variable=nt, bstep=3, binc=1
** Name: frac_f   Type: Field
*Field, variable=1, file=../thermal/thermal_f.odb, output variable=nt, bstep=3, binc=1
** Name: frac_m   Type: Field
*Field, variable=4, file=../thermal/thermal_m.odb, output variable=nt, bstep=3, binc=1
** Name: frac_p   Type: Field
*Field, variable=2, file=../thermal/thermal_p.odb, output variable=nt, bstep=3, binc=1
**
** INTERACTIONS
**
** Interaction: Weld1
*Model Change, add
Part-1-1.Weld1,
**
** OUTPUT REQUESTS
**
*Restart, write, frequency=0
**
** FIELD OUTPUT: F-Output-1
**
*Output, field, frequency=99999
*Node Output
U,
*Element Output, directions=YES
E, FV, S, SDV
*Output, history, frequency=0
*End Step
** ----------------------------------------------------------------
**
** STEP: Step4_Cooldown1
**
*Step, name=Step4_Cooldown1, nlgeom=NO, inc=100000
*Static
0.001, 1., 1e-10, 0.005
**
** PREDEFINED FIELDS
**
** Name: Temperature   Type: Temperature
*Temperature, file=../thermal/thermal.odb, bstep=4, binc=1
** Name: frac_a   Type: Field
*Field, variable=5, file=../thermal/thermal_a.odb, output variable=nt, bstep=4, binc=1
** Name: frac_b   Type: Field
*Field, variable=3, file=../thermal/thermal_b.odb, output variable=nt, bstep=4, binc=1
** Name: frac_f   Type: Field
*Field, variable=1, file=../thermal/thermal_f.odb, output variable=nt, bstep=4, binc=1
** Name: frac_m   Type: Field
*Field, variable=4, file=../thermal/thermal_m.odb, output variable=nt, bstep=4, binc=1
** Name: frac_p   Type: Field
*Field, variable=2, file=../thermal/thermal_p.odb, output variable=nt, bstep=4, binc=1
**
** OUTPUT REQUESTS
**
*Restart, write, frequency=0
**
** FIELD OUTPUT: F-Output-1
**
*Output, field, number interval=5
*Node Output
U,
*Element Output, directions=YES
E, FV, S, SDV
*Output, history, frequency=0
*End Step
** ----------------------------------------------------------------
**
** STEP: Step5_Heating2
**
*Step, name=Step5_Heating2, nlgeom=NO, inc=100000
*Static
0.005, 1., 1e-10, 0.005
**
** PREDEFINED FIELDS
**
** Name: Temperature   Type: Temperature
*Temperature, file=../thermal/thermal.odb, bstep=5, binc=1
** Name: frac_a   Type: Field
*Field, variable=5, file=../thermal/thermal_a.odb, output variable=nt, bstep=5, binc=1
** Name: frac_b   Type: Field
*Field, variable=3, file=../thermal/thermal_b.odb, output variable=nt, bstep=5, binc=1
** Name: frac_f   Type: Field
*Field, variable=1, file=../thermal/thermal_f.odb, output variable=nt, bstep=5, binc=1
** Name: frac_m   Type: Field
*Field, variable=4, file=../thermal/thermal_m.odb, output variable=nt, bstep=5, binc=1
** Name: frac_p   Type: Field
*Field, variable=2, file=../thermal/thermal_p.odb, output variable=nt, bstep=5, binc=1
**
** OUTPUT REQUESTS
**
*Restart, write, frequency=0
**
** FIELD OUTPUT: F-Output-1
**
*Output, field, number interval=5
*Node Output
U,
*Element Output, directions=YES
E, FV, S, SDV
*Output, history, frequency=0
*End Step
** ----------------------------------------------------------------
**
** STEP: Step6_Insert2
**
*Step, name=Step6_Insert2, nlgeom=NO
*Static, direct
1., 1.,
**
** PREDEFINED FIELDS
**
** Name: Temperature   Type: Temperature
*Temperature, file=../thermal/thermal.odb, bstep=6, binc=1
** Name: frac_a   Type: Field
*Field, variable=5, file=../thermal/thermal_a.odb, output variable=nt, bstep=6, binc=1
** Name: frac_b   Type: Field
*Field, variable=3, file=../thermal/thermal_b.odb, output variable=nt, bstep=6, binc=1
** Name: frac_f   Type: Field
*Field, variable=1, file=../thermal/thermal_f.odb, output variable=nt, bstep=6, binc=1
** Name: frac_m   Type: Field
*Field, variable=4, file=../thermal/thermal_m.odb, output variable=nt, bstep=6, binc=1
** Name: frac_p   Type: Field
*Field, variable=2, file=../thermal/thermal_p.odb, output variable=nt, bstep=6, binc=1
**
** INTERACTIONS
**
** Interaction: Weld2
*Model Change, add
Part-1-1.Weld2,
**
** OUTPUT REQUESTS
**
*Restart, write, frequency=0
**
** FIELD OUTPUT: F-Output-1
**
*Output, field, frequency=99999
*Node Output
U,
*Element Output, directions=YES
E, FV, S, SDV
*Output, history, frequency=0
*End Step
** ----------------------------------------------------------------
**
** STEP: Step7_Cooldown2a
**
*Step, name=Step7_Cooldown2a, nlgeom=NO, inc=100000
*Static
0.001, 1., 1e-10, 0.005
**
** PREDEFINED FIELDS
**
** Name: Temperature   Type: Temperature
*Temperature, file=../thermal/thermal.odb, bstep=7, binc=1
** Name: frac_a   Type: Field
*Field, variable=5, file=../thermal/thermal_a.odb, output variable=nt, bstep=7, binc=1
** Name: frac_b   Type: Field
*Field, variable=3, file=../thermal/thermal_b.odb, output variable=nt, bstep=7, binc=1
** Name: frac_f   Type: Field
*Field, variable=1, file=../thermal/thermal_f.odb, output variable=nt, bstep=7, binc=1
** Name: frac_m   Type: Field
*Field, variable=4, file=../thermal/thermal_m.odb, output variable=nt, bstep=7, binc=1
** Name: frac_p   Type: Field
*Field, variable=2, file=../thermal/thermal_p.odb, output variable=nt, bstep=7, binc=1
**
** OUTPUT REQUESTS
**
*Restart, write, frequency=0
**
** FIELD OUTPUT: F-Output-1
**
*Output, field, number interval=5
*Node Output
U,
*Element Output, directions=YES
E, FV, S, SDV
*Output, history, frequency=0
*End Step
** ----------------------------------------------------------------
**
** STEP: Step8_Cooldown2b
**
*Step, name=Step8_Cooldown2b, nlgeom=NO
*Static
0.1, 1., 1e-05, 0.1
**
** PREDEFINED FIELDS
**
** Name: Temperature   Type: Temperature
*Temperature, file=../thermal/thermal.odb, bstep=8, binc=1
** Name: frac_a   Type: Field
*Field, variable=5, file=../thermal/thermal_a.odb, output variable=nt, bstep=8, binc=1
** Name: frac_b   Type: Field
*Field, variable=3, file=../thermal/thermal_b.odb, output variable=nt, bstep=8, binc=1
** Name: frac_f   Type: Field
*Field, variable=1, file=../thermal/thermal_f.odb, output variable=nt, bstep=8, binc=1
** Name: frac_m   Type: Field
*Field, variable=4, file=../thermal/thermal_m.odb, output variable=nt, bstep=8, binc=1
** Name: frac_p   Type: Field
*Field, variable=2, file=../thermal/thermal_p.odb, output variable=nt, bstep=8, binc=1
**
** OUTPUT REQUESTS
**
*Restart, write, frequency=0
**
** FIELD OUTPUT: F-Output-1
**
*Output, field, frequency=99999
*Node Output
U,
*Element Output, directions=YES
E, FV, S, SDV
*Output, history, frequency=0
*End Step
