*Heading
** Job name: DCB50FELIni Model name: DCB50-Full-1el
** Generated by: Abaqus/CAE 2021
*Preprint, echo=NO, model=NO, history=NO, contact=NO
**
** PARTS
**
*Part, name=Part-1
*Node
      1,         -2.5,  -5.05000019
      2,         -2.5,  -2.54999995
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*Element, type=DC2D4
  1,    1,   35, 2824,  137
  2,   35,   36, 2825, 2824
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*Nset, nset=LoadT
 18,
*Nset, nset=LoadB
 5,
*Nset, nset=Interface
   14,   27,   28,   33, 1194, 1195
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*Elset, elset=Interface, generate
 18589,  19084,      1
*Nset, nset=All, generate
     1,  35903,      1
*Elset, elset=All, generate
     1,  35631,      1
** Section: SECTHeat
*Solid Section, elset=All, material=MATHeat
,
*End Part
**
**
** ASSEMBLY
**
*Assembly, name=Assembly
**
*Instance, name=Part-1-1, part=Part-1
*End Instance
**
*End Assembly
**
** MATERIALS
**
*Material, name=MATHeat
*Conductivity
1.,
*Depvar
2,
*Heat Generation
*Initial Conditions, Type=Solution
Part-1-1.All, 0.250, 0.0
**
** PREDEFINED FIELDS
**
** Name: Predefined Field-1   Type: Temperature
*Initial Conditions, type=TEMPERATURE
Part-1-1.All, 0.0
** ----------------------------------------------------------------
**
** STEP: InterfaceGeneration
**
*Step, name=InterfaceGeneration, nlgeom=NO
*Heat Transfer, steady state, deltmx=0.
0.1, 1.0, 0.1, 0.1
**
** BOUNDARY CONDITIONS
**
** Name: InterfaceGrowth Type: Temperature
*Boundary
Part-1-1.Interface, 11, 11, 1.
**
** OUTPUT REQUESTS
**
*Restart, write, frequency=0
**
** FIELD OUTPUT: F-Output-1
**
*Output, field
*Node Output
NT,
*Element Output, directions=YES
SDV,
*Output, history, frequency=0
*End Step
