*Heading
** Job name: DCB50FELRun Model name: DCB50-Full-1el-Run
** Generated by: Abaqus/CAE 2021
*Preprint, echo=NO, model=NO, history=NO, contact=NO
**
** PARTS
**
*Part, name=Part-1
*Node
      1,         -2.5,  -5.05000019
      2,         -2.5,  -2.54999995
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*Element, type=CPE4T
  1,    1,   35, 2824,  137
  2,   35,   36, 2825, 2824
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*Nset, nset=Interface
   14,   27,   28,   33, 1194, 1195
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*Elset, elset=Interface, generate
 18589,  19084,      1
*Nset, nset=All, generate
     1,  35903,      1
*Elset, elset=All, generate
     1,  35631,      1
** Section: SECTDMG
*Solid Section, elset=All, material=MATDMG
,
*End Part
**
**
** ASSEMBLY
**
*Assembly, name=Assembly
**
*Instance, name=Part-1-1, part=Part-1
*End Instance
**
*End Assembly
**
** MATERIALS
**
*Material, name=MATDMG
*Conductivity
1.,
*Depvar
8,
*Heat Generation
*User Material, constants=10
155000., 0.3, 0.250, 0.2347, 1, 0, 0, 1,
50, 10.0
**
** PREDEFINED FIELDS
**
** Name: Predefined Field-1   Type: Temperature
*Initial Conditions, type=TEMPERATURE
Part-1-1.All, 0.
*Initial Conditions, Type=field, file=DCBIni.odb, output variable=NT
** ----------------------------------------------------------------
**
** STEP: Interface
**
*Step, name=Interface, nlgeom=NO, extrapolation=NO, inc=1, unsymm=NO
*Coupled Temperature-displacement, creep=none, steady state
1., 1.
*Solution Technique, type=SEPARATED
**
** OUTPUT REQUESTS
**
*Restart, write, frequency=0
**
** FIELD OUTPUT: F-Output-1
**
*Output, field, frequency=11
*Node Output
NT, RF, U
*Element Output, directions=YES
FV, SDV
*Output, history, frequency=0
*End Step
