// COMSOL Multiphysics 6.0.0.405 model "IGC of 20 um.mph"
// Outline of the model tree

Parameters
  l = 4 [um]  // PF interface thickness
  A = 5e9 [N/m^2]  // Free energy density curvature
  kappa = (3/2)*gamma*l  // `Gradient energy coefficient
  csolid = 13.4 [mol/L]  // Average concentration of metal
  csat = 10.3 [mol/L]  // Average saturation concentration
  T = 300 [K]  // Temperature
  w = (3*gamma)/(4*l)  // Height of the double well potential
  R = 8.314 [J/(K*mol)]  // Molar gas constant
  L0 = 1 [m^2/(N*s)]  // Phase-field mobility (interfacial part)
  lp = 100 [nm]  // Grain Boundary Interface Thickness
  cLe = csat/csolid
  cSe = csolid/csolid
  gamma = 4 [N/m]  // Surface Energy
  Dgb = 1.75e-15 [m^2/s]  // Grain Boundary Diffusion Coefficient
  Dmg = 5.12e-21 [m^2/s]  // Metal Grain Diffusion Coefficient
  Kin = A*L0
  A_Cr = 51.9961 [g/mol]
  delta = 15 [nm]  // Physical Cr Segregation Thickness (i.e. GB thickness)

Functions
  step1: Step | location = 10; from = 1; to = 0; smooth = 20
  int1: Interpolation "Experimental Corrosion Depth" | table = {{0, 0}, {250, 10}}; extrap = none; extrapvalue = 1/2; argunit = s
  int2: Interpolation "Lower Experimental Weight Loss" | table = {{100, 0.32}, {250, 0.48}}; extrap = none; argunit = s
  int3: Interpolation "Upper Experimental Weight Loss" | funcs = {int2, 1}; table = {{100, 0.43}, {250, 1.1}}; extrap = none; argunit = s
  int4: Interpolation "Avg Experimental Weight Loss" | funcs = {int2, 1}; table = {{100, 0.4}, {250, 0.8}}; extrap = none; argunit = s
  step2: Step | location = 1800; from = 1; to = 0; smooth = 3600

Variables
  var1 "Variables 1"
    gp = 16*phi^2*(1-phi)^2  // Double well function g
    hp = phi^3*(6*phi^2-15*phi+10)  // Interpolation function h
    hpd = 30*phi^2*(phi-1)^2  // Derivative of interpolation function wrt phi
    gpd = 32*phi*(2*phi^2-3*phi+1)  // Derivative of double well wrt phi
    D = ((delta/lp)*Dgb*eta+(1-eta)*Dmg)  // Global Diffusion Coefficient
    Area = intop1(c<=cLe)
    NorL = intop1(phi*(c-hp*(cSe-cLe)))
    NorS = intop1(phi*(c-(1-hp)*(cLe-cSe)))
    avg_probe = (bnd1+bnd2+bnd3+bnd4+bnd5+bnd6)/6

Couplings
  intop1: Integration on all domains

Probes
  dom1: Domain "Simulation" on all domains
    type = maximum
    expr = 100[um]-if(phi<0.5,y,100)
    unit = µm
    descr = Simulation
    table = tbl1
  bnd1: Boundary "IGC" on boundaries 21, 24 | type = maximum; expr = 100[um]-if(phi<0.5,y,100); unit = µm; table = tbl1
  bnd6: Boundary "IGC 5" on boundaries 21, 29 | type = maximum; expr = 100[um]-if(phi<0.5,y,100); unit = µm; table = tbl1
  bnd2: Boundary "IGC 1" on boundaries 43 | type = maximum; expr = 100[um]-if(phi<0.5,y,100); unit = µm; table = tbl1
  bnd3: Boundary "IGC 2" on boundaries 50, 53, 61
    type = maximum
    expr = 100[um]-if(phi<0.5,y,100)
    unit = µm
    table = tbl1
  bnd4: Boundary "IGC 3" on boundaries 61, 67, 68
    type = maximum
    expr = 100[um]-if(phi<0.5,y,100)
    unit = µm
    table = tbl1
  bnd5: Boundary "IGC 4" on boundaries 80 | type = maximum; expr = 100[um]-if(phi<0.5,y,100); unit = µm; table = tbl1

Geometry
  geom1 "Geometry 1" (2D, length unit µm)
    imp2: Import
      type = native
      filename = C:\Users\atl21\OneDrive - Imperial College London\CNE PC\Documents\COMSOL\(iii) GBs Survey\Model Calibration\Geometries\20um\5GBs\20um#55_5GBs.mphbin
      meshfilename = C:\Users\atl21\OneDrive - Imperial College London\CNE PC\Documents\COMSOL\(iii) GBs Survey\Model Calibration\Geometries\20um\5GBs\20um#55_5GBs.mphbin
    fin: Finalize "Form Union"

Physics
  phi: CoefficientFormPDE "Phase-field" on all domains
    dependent variable phi
    ShapeProperty.boundaryFlux = 0
    ShapeProperty.boundaryFluxSmooth = 0
    Units.CustomSourceTermUnit = Pa
    cfeq1: CoefficientFormPDE (default)
      c = {kappa, 0, 0, kappa}
      f = (A*(c-hp*(cSe-cLe)-cLe)*(cSe-cLe)*hpd-w*gpd)
      da = 1/L0
    zflx1: ZeroFluxBoundary "Zero Flux 1" (default)
    init1: init "Initial Values 1" (default) | phi = 1
    dir1: DirichletBoundary "Dirichlet Boundary Condition 1" on boundaries 15, 22, 49, 51, 75, 81 | r = step2(t*1[1/s])
    dir2: DirichletBoundary "Dirichlet Boundary Condition 2" (disabled) on no boundaries | r = 1
  c: GeneralFormPDE "Diffusion-Equation" on all domains
    dependent variable c
    ShapeProperty.boundaryFlux = 0
    ShapeProperty.boundaryFluxSmooth = 0
    Units.CustomSourceTermUnit = 1/s
    gfeq1: GeneralFormPDE (default) | f = 0; Ga = {-D*cx+D*(cSe-cLe)*d(hp,x), -D*cy+D*(cSe-cLe)*d(hp,y)}; da = 1
    zflx1: ZeroFluxBoundary "Zero Flux 1" (default)
    init1: init "Initial Values 1" (default) | c = 1
    dir1: DirichletBoundary "Dirichlet Boundary Condition 1" on boundaries 15, 22, 49, 51, 75, 81 | r = step2(t*1[1/s])
  eta: CoefficientFormPDE on all domains
    dependent variable eta
    ShapeProperty.boundaryFlux = 0
    ShapeProperty.boundaryFluxSmooth = 0
    Units.CustomSourceTermUnit = 1
    cfeq1: CoefficientFormPDE (default) | c = {lp^2, 0, 0, lp^2}; a = 1; f = 0; da = 0
    zflx1: ZeroFluxBoundary "Zero Flux 1" (default)
    init1: init "Initial Values 1" (default)
    dir1: DirichletBoundary "Dirichlet Boundary Condition 1" on boundaries 6, 8, 10, 12, 14, 16-21, 23-26, 28-31, 33-36, 38-48, 50, 52-55, 57, 59-70, 72-74, 78-80, 84-88
      r = 1

Mesh
  mesh1 "Mesh 1"
    size: MeshSizeDefault | hmax = 6.7; hmin = 0.03; hcurve = 0.3; hgrad = 1.3
    edg1: Edge on boundaries 6, 8, 10, 12, 14-26, 28-31, 33-36, 38-55, 57, 59-70, 72-75, 78-81, 84-88
      size1: Size on boundaries 6, 8, 10, 12, 14-26, 28-31, 33-36, 38-55, 57, 59-70, 72-75, 78-81, 84-88
        hmax = lp
        hgrad = 1.0
        custom = on
    ftri3: FreeTri "Free Triangular 3" on domains 7, 10, 17, 19, 25, 29
      size1: Size on domains 7, 10, 17, 19, 25, 29 | hmax = l/5; custom = on
    ftri4: FreeTri "Free Triangular 4" on remaining entities
      size1: Size on entire geometry | hmax = l; custom = on

Studies
  std1 "Study 1"
    stat: Stationary | solve for = {eta}
    time: Transient "Time Dependent"
      tunit = h
      tlist = range(0,30000/30,30000)
      usertol = on
      rtol = 1e-4
      solve for = {phi, c}

Solver configurations
  sol1 "Solution 1" (study std1)
    v1: Variables "Dependent Variables 1"
    s1: Stationary "Stationary Solver 1"
      dDef: Direct
      fc1: FullyCoupled | linsolver = dDef
    su1: StoreSolution "Solution Store 1"
    v2: Variables "Dependent Variables 2" | initmethod = sol; notsolmethod = sol
    t1: Time "Time-Dependent Solver 1"
      tlist = range(0,30000/30,30000)
      tstepsbdf = strict
      initialstepbdf = 1e-3
      maxstepconstraintbdf = const
      maxstepbdf = 30
      maxorder = 2
      stabcntrl = on
      dDef: Direct
      fc1: FullyCoupled
        linsolver = dDef
        maxiter = 200
        ntolfact = 0.5
        damp = 0.9
        jtech = once
        stabacc = aacc
        aaccdim = 100
  sol2 "Solution Store 1" (study std1)

Datasets
  dset1: Solution | solution = sol1
  dset2: Solution | solution = sol2
  dset3: Solution "Probe Solution 3" | solution = sol1
  max1: Maximum "Simulation" on domains 1-32 | data = dset3
  int1_ds1: Grid1D | function = all; parmin1 = 95; parmax1 = 275
  ptds1: CutPoint1D | data = int1_ds1; pointx = 95.0 275.0
  int2_ds1: Grid1D "Grid 1D 1a"
  ptds2: CutPoint1D | data = int2_ds1; pointx = 100.0 250.0
  int2_ds2: Grid1D
  ptds3: CutPoint1D | data = int2_ds2; pointx = 100.0 250.0
  int1_ds2: Grid1D "Grid 1D 2a"
  ptds4: CutPoint1D | data = int1_ds2; pointx = 0.0 250.0
  int2_ds3: Grid1D | function = int3
  ptds5: CutPoint1D | data = int2_ds3; pointx = 100.0 250.0
  int2_ds4: Grid1D | function = int4
  ptds6: CutPoint1D | data = int2_ds4; pointx = 100.0 250.0
  max2: Maximum "IGC" on boundaries 21, 24 | data = dset3
  max3: Maximum "IGC 1" on boundaries 43 | data = dset3
  max4: Maximum "IGC 2" on boundaries 50, 53, 61 | data = dset3
  max5: Maximum "IGC 3" on boundaries 61, 67, 68 | data = dset3
  max6: Maximum "IGC 4" on boundaries 80 | data = dset3
  max7: Maximum "IGC 5" on boundaries 21, 29 | data = dset3

Derived values
  pev1: EvalPoint "Simulation" | data = max1; table = tbl1; expr = 100[um]-if(phi<0.5,y,100)
  gev1: EvalGlobal "Global Evaluation 1" | data = dset1; table = tbl4; expr = Area
  gev2: EvalGlobal "Global Evaluation 2" | data = dset1; table = tbl5; expr = WeightLoss*A_Cr*csolid*1 [um]
  gev3: EvalGlobal "Global Evaluation 3" | data = dset1; table = tbl6; expr = avg_probe
  pev2: EvalPoint "IGC" | data = max2; table = tbl1; expr = 100[um]-if(phi<0.5,y,100)
  pev3: EvalPoint "IGC 5" | data = max7; table = tbl1; expr = 100[um]-if(phi<0.5,y,100)
  pev4: EvalPoint "IGC 1" | data = max3; table = tbl1; expr = 100[um]-if(phi<0.5,y,100)
  pev5: EvalPoint "IGC 2" | data = max4; table = tbl1; expr = 100[um]-if(phi<0.5,y,100)
  pev6: EvalPoint "IGC 3" | data = max5; table = tbl1; expr = 100[um]-if(phi<0.5,y,100)
  pev7: EvalPoint "IGC 4" | data = max6; table = tbl1; expr = 100[um]-if(phi<0.5,y,100)

Tables
  tbl1: Table "Probe Table 1"
    Time (h) | Simulation (µm), Simulation | Dependent variable phi (µm), IGC | Dependent variable phi (µm), IGC 5 | Dependent variable phi (µm), IGC 1 | Dependent variable phi (µm), IGC 2 | Dependent variable phi (µm), IGC 3 | Dependent variable phi (µm), IGC 4
    0 | -9.99999e+07 | -9.99999e+07 | -9.99999e+07 | -9.99999e+07 | -9.99999e+07 | -9.99999e+07 | -9.99999e+07
    0.001 | -9.99999e+07 | -9.99999e+07 | -9.99999e+07 | -9.99999e+07 | -9.99999e+07 | -9.99999e+07 | -9.99999e+07
    0.002 | -9.99999e+07 | -9.99999e+07 | -9.99999e+07 | -9.99999e+07 | -9.99999e+07 | -9.99999e+07 | -9.99999e+07
    0.004 | -9.99999e+07 | -9.99999e+07 | -9.99999e+07 | -9.99999e+07 | -9.99999e+07 | -9.99999e+07 | -9.99999e+07
    0.008 | -9.99999e+07 | -9.99999e+07 | -9.99999e+07 | -9.99999e+07 | -9.99999e+07 | -9.99999e+07 | -9.99999e+07
    0.016 | -9.99999e+07 | -9.99999e+07 | -9.99999e+07 | -9.99999e+07 | -9.99999e+07 | -9.99999e+07 | -9.99999e+07
    0.032 | -9.99999e+07 | -9.99999e+07 | -9.99999e+07 | -9.99999e+07 | -9.99999e+07 | -9.99999e+07 | -9.99999e+07
    0.048 | -9.99999e+07 | -9.99999e+07 | -9.99999e+07 | -9.99999e+07 | -9.99999e+07 | -9.99999e+07 | -9.99999e+07
    0.064 | -9.99999e+07 | -9.99999e+07 | -9.99999e+07 | -9.99999e+07 | -9.99999e+07 | -9.99999e+07 | -9.99999e+07
    0.08 | -9.99999e+07 | -9.99999e+07 | -9.99999e+07 | -9.99999e+07 | -9.99999e+07 | -9.99999e+07 | -9.99999e+07
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  tbl4: Table "Area"
    // Global Evaluation 1
    Time (h) | Area (m^2)
    0 | 2.07877e-08
    25 | 2.04236e-08
    50 | 2.02332e-08
    75 | 2.00825e-08
    100 | 1.995e-08
    125 | 1.98292e-08
    150 | 1.97167e-08
    175 | 1.96081e-08
    200 | 1.95063e-08
    225 | 1.94079e-08
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  tbl5: Table "Weight Loss"
    // Global Evaluation 2
    Time (h) | WeightLoss*A_Cr*csolid*1 [um] (kg)
    0 | 1.42475e-11
    50 | 1.32088e-11
    100 | 1.25319e-11
    150 | 1.20819e-11
    200 | 1.17163e-11
    250 | 1.13219e-11
    300 | 1.09721e-11
    350 | 1.06209e-11
    400 | 1.0259e-11
    450 | 9.96117e-12
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  tbl6: Table "Avg. CD"
    // Global Evaluation 3
    Time (h) | avg_probe (µm)
    0 | -9.99999e+07
    16.6667 | 2.96868
    33.3333 | 4.00993
    50 | 4.78192
    66.6667 | 5.42058
    83.3333 | 5.96799
    100 | 6.45455
    116.667 | 6.90722
    133.333 | 7.31778
    150 | 7.70553
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
Plots
  pg1: PlotGroup2D "PHI + CONC" | data = dset1
    surf1: Surface "phi" | expr = phi; unit = 1
    surf2: Surface "conc" | expr = c
      def1: Deform "Deformation 1" | expr = {110, 0}
    mesh1: Mesh (disabled)
      def1: Deform "Deformation 1" | expr = {220, 0}
    con1: Contour (disabled) | expr = phi; levelmethod = levels; levels = range(0.49,0.01,0.5); includeoutside = off
  pg2: PlotGroup2D "Diffusion" | data = dset1
    surf1: Surface | expr = L0
  pg3: PlotGroup2D "Driving Force" | data = dset1
    surf1: Surface "Chemical" | expr = (A*(c-hp*(cSe-cLe)-cLe)*(cSe-cLe)*hpd-w*gpd)
    surf2: Surface "Interfacial" | expr = kappa*d(d(phi,y),y)
      def1: Deform "Deformation 1" | expr = {110, 0}
  pg4: PlotGroup1D "Corrosion Depth" | data = none; xlabel = Exposure Time [h]; ylabel = Corrosion Depth [um]
    plot1: Function
      data = int1_ds2
      expr = comp1.int1(t[1/m][s])
      descr = int1(t)
      xdataexpr = t
      upperbound = 250
      display = linepoints
      extrapolation = leftright
      pointdef = ptds4
    tblp1: Table "Probe Table Graph 1" | table = tbl1
  pg7: PlotGroup1D "Corrosion Area/Weight Loss" | data = dset1; xlabel = Exposure Time [h]; ylabel = Weight Loss [g/m^2]
    glob1: Global "Corroded Area (phi) Method"
      expr = {(Area*A_Cr*csolid)/(100 [um]), , }
      unit = {g/m^2, , }
      descr = {c<=cLe, , }
    plot3: Function "Avg Exp Limit"
      data = int2_ds4
      expr = comp1.int4(t[1/m][s])
      pointdef = ptds6
      legends = Upper Exp Limit
    glob2: Global "Normalized Concentrations Method" (disabled)
      expr = {, ((10000 [um^2]-NorL)*A_Cr*csolid)/(100 [um]), ((10000 [um^2]-NorS)*A_Cr*csolid)/(100 [um])}
      unit = {, g/m^2, g/m^2}
      descr = {, NorL, NorS}
    plot1: Function "Lower Exp Limit" (disabled)
      data = int2_ds2
      expr = comp1.int2(t[1/m][s])
      autoexpr = on
      legends = Lower Exp Limit
    plot2: Function "Upper Exp Limit" (disabled)
      data = int2_ds3
      expr = comp1.int3(t[1/m][s])
      pointdef = ptds5
      legends = Upper Exp Limit
  pg5: PlotGroup1D "Weight Change" (disabled) | data = dset1; xlabel = Time (h)
    glob1: Global "Weight Loss" | expr = {, (WeightLoss*A_Cr*csolid)/(300 [um])}; descr = {, Weight Loss}
  pg6: PlotGroup2D "Concentration" | data = dset1
    surf1: Surface "Solid Norm. Conc." (disabled) | expr = phi*(c-(1-hp)*(cLe-cSe)); unit = 1
    surf2: Surface "Liquid Norm. Conc." | expr = c
      def1: Deform "Deformation 1" (disabled) | expr = {0, -80}
  pg8: PlotGroup1D "Nor. Concentration" | data = dset1
    glob1: Global | expr = {10000 [um^2]-NorL, 10000 [um^2]-NorS, Area}; descr = {NorL, NorS, phi<0.5}
  pg9: PlotGroup1D "Probe Plot Group 9"
    tblp1: Table "Probe Table Graph 1" | table = tbl1
  pg10: PlotGroup2D "IGC 1" | data = dset1
    surf1: Surface "phi" (disabled) | expr = phi
    surf2: Surface "conc" | expr = c; wireframe = on
    surf3: Surface "conc 1" | expr = c
  pg11: PlotGroup2D "IGC 2" | data = dset1
    surf1: Surface "phi" (disabled) | expr = phi
    surf2: Surface "conc" | expr = c; wireframe = on
    surf3: Surface "conc 1" | expr = c
  pg12: PlotGroup2D "IGC 3" | data = dset1
    surf1: Surface "phi" (disabled) | expr = phi
    surf2: Surface "conc" | expr = c; wireframe = on
    surf3: Surface "conc 1" | expr = c
  pg13: PlotGroup2D "IGC 4" | data = dset1
    surf1: Surface "phi" (disabled) | expr = phi
    surf2: Surface "conc" | expr = c; wireframe = on
    surf3: Surface "conc 1" | expr = c
  pg14: PlotGroup2D "IGC phi 1" | data = dset1
    surf1: Surface | expr = phi
  pg15: PlotGroup2D "IGC phi 2" | data = dset1
    surf1: Surface | expr = phi
  pg16: PlotGroup2D "IGC phi 3" | data = dset1
    surf1: Surface | expr = phi
  pg17: PlotGroup2D "IGC phi 4" | data = dset1
    surf1: Surface | expr = phi
  pg18: PlotGroup2D "Rep_Microstructure" | data = dset1
    surf1: Surface | expr = L0

Exports
  anim1: Animation
    giffilename = C:\Users\atl21\OneDrive - Imperial College London\CNE PC\Documents\COMSOL\(iii) GBs Survey\Model Calibration\Updated\6GBs_SimConc.gif
    maxframes = 21
    width = 1080
    frametime = 0.5
  plot1: Plot
    filename = C:\Users\atl21\OneDrive - Imperial College London\(i) CNE PC\Documents\(i) Modelling\(ii) GBs Survey\2D\Extended Exposure (near-surface GBs + GS)\ExtExp_30000h_20um_5GBs_100nm_MaxCD.txt
  plot2: Plot
    filename = C:\Users\atl21\OneDrive - Imperial College London\CNE PC\Documents\COMSOL\(iii) GBs Survey\2D\Updated_Microstructure sensitivity analysis\5GBs\Revamp\5GB_WeightLoss_#6.txt