// COMSOL Multiphysics 5.6.0.401 model "PhaseFieldFatigueSphere_v5.6simple.mph"
// Outline of the model tree

Parameters
  E = 93 [GPa]  // Young's modulus
  nu = 0.3  // Poisson's ratio
  rho = 4.14 [g/cm^3]  // Density
  T = 300 [K]  // Temperature
  D = 7.08e-15 [m^2 / s]  // Diffusion coefficient
  Omega = 3.497 [cm^3/mol]  // Partial molar volume
  C0 = Cmax*0.9  // Initial concentration
  k = 1e-05  // Phase field numerical parameter
  l0 = 0.01[um]  // Phase field length scale
  Gc = 10 [N/m]  // Fracture energy
  hmax = l0/2  // Element size
  Totalt = 3600/C_rate+500*0  // running time #3*Radius^2/D
  mu = E/(2*(1+nu))
  lanta = E*nu/((1+nu)*(1-2*nu))
  j_BV = Radius/3*Cmax*C_rate/3600[s]  // Flux
  Radius = 5 [um]  // Radius of the particle
  C_rate = 8  // C-rate
  Cmax = 22900 [mol/m^3]  // max concentration
  Cref = C0  // concentration for free stress
  l_cr = 0.1 [um]  // initial crack length
  K_bulk = lanta+2/3*mu
  t_tau = 1 [um^2]/D  // characteristic time
  alphT = Gc/12/l0  // fatigue toughness disabled by a large value
  T0 = Radius/3*Cmax/j_BV*0.7
  w_cr0 = Radius/200  // crack width

Functions
  rect1: Rectangle | lower = 0; upper = 1
  an1: Analytic | funcname = periload; expr = -rect1(x/T0)*2+1; periodic = on; periodicupper = T0*2; argunit = s; fununit = 1

Variables
  var1 "Variables 1"
    trE = solid.eel11+solid.eel22+solid.eel33
    Edev2 = (solid.eel11-trE/3)^2+(solid.eel22-trE/3)^2+(solid.eel33-trE/3)^2+solid.eel13^2*2++solid.eel12^2*2++solid.eel23^2*2
    trEp = 0.5*(trE+abs(trE))
    trEn = 0.5*(trE-abs(trE))
    fai_p = 0.5*K_bulk*trEp^2+mu*Edev2
    fai_n = 0.5*K_bulk*trEn^2
    g = (1-p)^2+k  // Degradation function
    Eg = E*g
    Dg = D*g
    alph = fai_p*g
    Gcg = Gc*max(f_alph,0.01)
    f_alph = 1*(alphB<alphT)+(2*alphT/(alphB+alphT))^2*(alphB>=alphT)
    Sh = -solid.pm

Couplings
  aveop1: Average on all domains | opname = avgC
  intop1: Integration on all domains | opname = int_V; axisym = on
  maxop1: Maximum on all domains | points = integration
  minop1: Minimum on all domains | points = integration

Common definitions
  state1: StateVariables "State Variables H" on all domains
    state = H
    initialValue = if(r> Radius-l_cr && z<w_cr0,1e12*exp(-abs(z*10/w_cr0)^2), 0)
    updateExpression = if(fai_p>H,fai_p,H)
  state3: StateVariables "State Variables alphB" on all domains
    state = alphB
    initialValue = 0
    updateExpression = if(alph*(alph - alphN)>0,alphB+abs(alph - alphN), alphB)
  state4: StateVariables "State Variables alphN" on all domains | state = alphN; initialValue = 0; updateExpression = alph

Geometry
  geom1 "Geometry 1" (2D axisymmetric, length unit m)
    b1: BezierPolygon "Bézier Polygon 1"
      p = {{0, Radius, Radius, 0}, {0, 0, Radius, Radius}}
      degree = {1, 2}
      w = {1, 1, 1, 1/sqrt(2), 1}
    r1: Rectangle | size = {Radius-l_cr, w_cr0}
    r2: Rectangle | pos = {Radius-l_cr, 0}; size = {l_cr, w_cr0}
    par1: Partition "Partition Objects 1" | input = b1; tool = r1, r2
    fin: Finalize "Form Union"

Physics
  solid: SolidMechanics on all domains
    dependent variable u = {u, v, w}
    ShapeProperty.order_displacement = 2
    ShapeProperty.boundaryFlux_displacement = 0
    ShapeProperty.valueType = real
    Mode2Daxi.ModeExtension = 0
    StructuralTransientBehavior.StructuralTransientBehavior = Quasistatic
    lemm1: LinearElasticModel "Linear Elastic Material 1" (default)
      IsotropicOption = Enu
      E_mat = userdef
      E = Eg
      nu_mat = userdef
      nu = nu
      lambLame_mat = userdef
      lambLame = lanta
      muLame_mat = userdef
      muLame = mu
      rho_mat = userdef
      rho = rho
      hs1: HygroscopicSwelling on all domains
        Mm = 1
        cmo_ref = Cref
        IncludeAsMass = 0
        beta_h_mat = userdef
        beta_h = Omega/3 [kg/mol]
        cmo = comp1.c
        cmo_src = userdef
    axi1: AxialSymmetrySolid "Axial Symmetry 1" (default)
    free1: Free (default)
    init1: init "Initial Values 1" (default)
    fix1: Fixed "Fixed Constraint 1" (disabled) on points 1
    bndl1: BoundaryLoad (disabled) on boundaries 8 | LoadType = FollowerPressure; FollowerPressure = -8e7 [Pa]*t/Totalt
    symp1: SymmetryPlane on boundaries 2, 6 | weakConstraints = 0
  tds: DilutedSpecies "Transport of Diluted Species" on all domains
    dependent variable c
    ShapeProperty.order_concentration = 2
    EquationForm.form = Transient
    TransportMechanism.Convection = 1
    TransportMechanism.Migration = 0
    TransportMechanism.MassTransferInPorousMedia = 0
    TransportMechanism.DispersionInPorousMedia = 0
    TransportMechanism.VolatilizationInPartiallySaturatedPorousMedia = 0
    MassConsistentStabilization.massStreamlineDiffusion = 0
    MassInconsistentStabilization.massIsotropicDiffusion = 1
    AdvancedSettings.ConvectiveTerm = cons
    cdm1: ConvectionDiffusionMigration "Transport Properties 1" (default)
      u = {D*Omega/(R_const*T)*d(Sh,R)*d(R,r), 0, D*Omega/(R_const*T)*d(Sh,Z)*d(Z,z)}
      D_c = D
      V_src = userdef
      V = 0
      minput_temperature = T
    axi1: AxialSymmetry (default)
    nflx1: NoFlux (default)
    init1: init "Initial Values 1" (default) | initc = C0
    fl3: FluxBoundary "Flux" on all boundaries | species = 1; J0 = periload(t)*j_BV; IncludeConvection = 1
    sym1: Symmetry on boundaries 2, 6
  hzeq: StabilizedConvectionDiffusionEquation "Phase field Equation" on all domains
    dependent variable p
    ShapeProperty.order_none = 2
    ShapeProperty.valueType = complex
    EquationForm.form = Transient
    Units.DependentVariableQuantity = none
    Units.CustomDependentVariableUnit = 1
    Units.CustomSourceTermUnit = 1
    ConsistentStabilization.StreamlineDiffusion = 0
    ConsistentStabilization.CrosswindDiffusion = 0
    InconsistentStabilization.IsotropicDiffusion = 0
    cdeq1: ConvectionDiffusionEquation "Helmholtz Equation1" (default)
      da = 0
      c = l0^2
      a = 2*H*l0/Gcg+1
      f = 2*H*l0/Gcg
    init1: InitialValues (default)
    axi1: AxialSymmetry (default)
    nflx1: NoFlux (default)
  ev: Events on all domains
    expl1: ExplicitEvent | start = T0; period = T0

Mesh
  mesh1 "Mesh 1"
    size: MeshSizeDefault | hmax = Radius/30; hmin = hmax; hcurve = 0.5; hnarrow = 2; hgrad = 1.8; hauto = 4; custom = on
    ftri1: FreeTri "Free Triangular 1" on remaining entities

Studies
  std1 "Study 1"
    time: Transient "Time Dependent" | tlist = range(0,T0/2,T0*60); usertol = on; rtol = 0.001

Solver configurations
  sol1 "Solution 1" (study std1)
    v1: Variables "Dependent Variables 1"
      comp1_u: Field "Displacement field (comp1.u)" | scaleval = 1e-2*0.000894413215466
    t1: Time "Time-Dependent Solver 1"
      tlist = range(0,T0/2,T0*60)
      rtol = 0.001
      atolglobalfactor = 0.01
      initialstepbdf = 1e-5*T0
      maxstepbdf = T0/20
      stabcntrl = on
      rescaleafterinitbw = on
      dDef: Direct | linsolver = pardiso
      ps2: PreviousSolution "Previous Solution H" | prevcomp = {comp1_state4, comp1_state1, comp1_state3}
      fc1: FullyCoupled | maxiter = 2000; ntolfact = 0.01; jtech = once; stabacc = aacc; aaccdim = 40

Datasets
  dset1: Solution | solution = sol1
  mir1: Mirror2D | data = dset1; genpoints = {{0, 0}, {1, 0}}
  rev1: Revolve2D "Revolution 2D 1" | data = mir1; startangle = -90; revangle = 225

Plots
  pg2: PlotGroup2D "Phase field" | data = dset1
    surf1: Surface | expr = comp1.p; descr = Phase field
  pg3: PlotGroup2D "concentration" | data = dset1
    surf1: Surface | expr = comp1.c; descr = Concentration
  pg4: PlotGroup2D "displacement" | data = dset1
    surf1: Surface | expr = solid.disp
      def1: Deform "Deformation 1" | expr = {u, w}
  pg5: PlotGroup2D "Von Mises stress" | data = dset1
    surf1: Surface | expr = solid.mises
  pg6: PlotGroup3D "3D Plot Group 6" | data = rev1
    surf1: Surface | expr = comp1.solid.disp
  pg7: PlotGroup2D "2D Plot Group H" | data = dset1
    surf1: Surface | expr = comp1.H
  pg9: PlotGroup1D "l_crt" | data = dset1; xlabel = Number of cycles; ylabel = Normalised crack area
    glob1: Global | expr = int_V(p>0.95)/Radius^3/2/pi*3*100; xdata = expr; xdataexpr = t/T0/2
  pg10: PlotGroup1D "c_avg" | data = dset1
    glob1: Global | expr = avgC(c)/Cmax
  pg11: PlotGroup1D "Gc" | data = dset1
    glob1: Global | expr = minop1(Gcg)/Gc
  pg12: PlotGroup1D "invGc" | data = dset1
    glob1: Global | expr = int_V(Gcg)/Gc/Radius^3/(4/3*pi)*2
  pg13: PlotGroup1D "1D Plot Group 13" | data = dset1
    glob1: Global

Exports
  anim3: Animation "Mises stress"
    target = player
    movietype = avi
    avifilename = D:\comsol_works\phase field\halfsphere_stress.avi
    framesel = all
    maxframes = 81
  anim4: Animation "phi" | movietype = avi; avifilename = D:\comsol_works\phase field\halfsphere_phi.avi; framesel = all
  anim5: Animation "c"
    movietype = avi
    avifilename = D:\comsol_works\phase field\halfsphere_c.avi
    framesel = all
    maxframes = 81
  anim6: Animation "disp"
    movietype = avi
    avifilename = D:\comsol_works\phase field\halfsphere_disp.avi
    framesel = all
    maxframes = 81
  plot1: Plot | filename = C:\Users\Weilong Ai\Documents\temp\l_cr_SRL50_c5_v5.6simple.txt