// COMSOL Multiphysics 5.6.0.401 model "crackingMain147dC20.mph"
// Outline of the model tree

Parameters
  width = 15 [cm]  // Width of the concrete sample
  thickness = 1 [m]  // Thickness of the concrete sample
  heigth = width  // Heigth of the concrete sample
  barDiam = 16 [mm]  // Steel rebar diameter (hole)
  holeX = width/2  // x-coordinate of the centre of steel rebar (hole)
  holeY = heigth - cover - barDiam/2  // y-coordinate of the centre of steel rebar (hole)
  hsize = 0.6 [mm]  // Characteristic mesh size
  SCI = 0.2 [mm]  // Thickness of steel-concrete interface
  cover = 20 [mm]  // Thickness of concrete cover
  ft = 3.90[MPa]  // Tensile strength of concrete
  Gf = 0.114[N/mm]  // Fracture energy of concrete
  charLength = 5*hsize  // Characteristic length for phase-field model
  xi = 2  // Phase-field parameter
  p = 2  // Phase-field parameter
  Ec = 36000[MPa]  // The Young modulus of concrete without rust
  nuC = 0.20  // The Poisson ratio of concrete without rust
  Ep = 440 [MPa]  // The Young modulus of precipitates
  nuP = 0.4  // The Poisson ratio of precipitates
  ia = 0.1 [A/m^2]  // Corrosion current density
  MFe = 55.845e-3 [kg/mol]  // Molar mass of iron
  za = 2  // Number of atoms exchanged
  F = F_const  // Faraday constant
  rhoP = 3560 [kg/m^3]  // Akaganeite density
  rhoFe = 7874 [kg/m^3]  // Fe2+ intrinsic density
  Mp = 106.845e-3 [kg/mol]  // Molar mass FeO(OH) + H2O
  kII = 0.1 [mol^(-1)*m^3*s^(-1)]  // Kinetic constant for Fe2+ oxidation
  kIII = 2e-4 [s^(-1)]  // Kinetic constant for Fe3+ precipitation
  AUXmol = 1 [mol]  // Artificial parameter for unit conversion
  AUXm = 1 [m]  // Artificial parameter for unit conversion
  DII = 1/porInit*1e-11 [m^2/s]  // Fe2+ diffusion coefficient in pore solution
  daySec = 24*60*60  // Seconds in one day
  DIII = DII  // Fe3+ diffusion coefficient in pore solution
  Dc = 7e-10 [m^2/s]  // Fully cracked concrete diffusivity
  cOX = 0.28 [mol/m^3]  // Concentration of oxygen in pore solution
  porInit = 0.26  // Initial porosity of cement paste (bulk)
  stepSize = 0.2  // Number of days for one time step
  runTime = 60  // Total number of days
  dataTime = 5  // Number of days for one save data step
  r0 = 0.16  // Porosity of rust

Variables
  var1 "Variables - Phase-field"
    pol1 = (1-phi)^p
    pol2 = a1*phi*(1+a2*phi+a3*phi^2)
    dpol1 = -p*(1-phi)^(p-1)
    dpol2 = a1+2*a1*a2*phi+3*a1*a3*phi^2
    omega = pol1/(pol1+pol2)
    domega = (dpol1*(pol1+pol2)-pol1*(dpol1+dpol2))/(pol1+pol2)^2
    dalpha = xi+2*(1-xi)*phi
    sigma1_bar = max(solid.sp1/omega,0)
    Y_bar = 0.5*sigma1_bar*sigma1_bar/E_bar
    H = max(Y0,max(Ymax,Y_bar))
    pfEq1 = -domega*H-Gf*dalpha/pi/charLength
    a1 = 2*xi*lch_bar/pi/charLength
    a2 = 1.3868
    a3 = 0.9106
    pfEq2 = 2*charLength*Gf/pi
    Y0 = ft^2/2/E_bar
    lch_bar = E_bar*Gf/ft/ft
    inelEps1 = (1-omega)*solid.eXX  // Strain for surface crack width calculation
  var14 "Variables - Chemistry"
    VFp = thP*(AUXm^3/AUXmol)  // Precipitate volume fraction
    Sp = VFp/porInit  // Precipitate saturation ratio
    mIIox = VFl*kII*cII*cOX  // Source/sink term for cII calculation
    mIIIpr = VFl*kIII*cIII  // Source/sink term for cIII calculation
    MIIIpr = VFl*(Mp/rhoP)*kIII*cIII  // Source/sink term for thC calculation
    por = porInit  // Initial concrete porosity (bulk)
    FluxFeII = 2*ia/(za*F)  // Fe2+ flux on the steel surface
  var9 "Variables - Eigenstrain, Poisson ratio, Young's modulus"
    E0 = (1-VFp)*Ec + VFp*Ep
    v0 = (1-VFp)*nuC + VFp*nuP
    E_bar = Ec*(1-v0)/(1-2*v0)/(1+v0)
    Kp = Ep/(3*(1-2*nuP))
    K0 = E0/(3*(1-2*v0))
    eigStrStar = 1/3*epsV*Sp
    epsV = rhoFe*Mp/((1-r0)*rhoP*MFe) -1
    C = (3*(1-v0)*Kp)/((1+v0)*Kp-(4*v0-2)*K0)
    eigStr = C*eigStrStar
  var11 "Porosity concrete bulk" on domains 1
    VFl = por-VFp
  var15 "Porosity concrete SCI" on domains 2
    VFl = 2*por-VFp

Probes
  bnd1: Boundary "Boundary Probe 1" on boundaries 3 | type = integral; expr = inelEps1; table = tbl4

Common definitions
  state1: StateVariables "Crack driving force history function" on domains 1, 2
    state = Ymax
    initialValue = 0
    updateExpression = max(Y_bar,Ymax)
    update = afterStep

Geometry
  geom1 "Geometry 1" (2D, length unit m)
    r1: Rectangle | size = {width, heigth}
    c1: Circle | pos = {holeX, holeY}; r = barDiam/2
    c2: Circle | pos = {holeX, holeY}; r = barDiam/2 + barDiam/10*2
    c3: Circle | pos = {holeX, holeY}; r = barDiam/2 +SCI
    ls1: LineSegment
      specify1 = coord
      coord1 = {0, heigth-cover-barDiam - 0.05}
      specify2 = coord
      coord2 = {width, heigth-cover-barDiam - 0.05}
    fin: Finalize "Form Union"
    mcd1: MeshControlDomains | input = fin(1) domains 2

Materials
  mat1: Common "Concrete" on domains 1, 2
    def "Basic"
      thermalexpansioncoefficient = 10e-6[1/K]
      density = 2300[kg/m^3]
      thermalconductivity = 1.8[W/(m*K)]
      heatcapacity = 880[J/(kg*K)]
      ft = ft
      DESCR_PREFIX:ft = Tensile strength
      porosity = VFl
    Enu "Young's modulus and Poisson's ratio"
      youngsmodulus = E0
      poissonsratio = v0
  mat2: Common "Steel AISI 4340" on domains 3
    def "Basic"
      relpermeability = 1
      electricconductivity = 4.032e6[S/m]
      thermalexpansioncoefficient = 12.3e-6[1/K]
      heatcapacity = 475[J/(kg*K)]
      relpermittivity = 1
      density = 7850[kg/m^3]
      thermalconductivity = 44.5[W/(m*K)]
    Enu "Young's modulus and Poisson's ratio"
      youngsmodulus = 205e9[Pa]
      poissonsratio = 0.28

Physics
  solid: SolidMechanics on all domains
    dependent variable u = {u, v, w}
    ShapeProperty.order_displacement = 1
    ShapeProperty.boundaryFlux_displacement = 1
    Type2D.Type2D = PlaneStrain
    Type2D.ModeExtension = 0
    d.d = thickness
    StructuralTransientBehavior.StructuralTransientBehavior = Quasistatic
    lemm1: LinearElasticModel "Linear Elastic Material 1" (default)
      MixedFormulation = none
      E_mat = userdef
      E = omega*E0
      nu_mat = userdef
      nu = v0
      rho_mat = from_mat
      dmg1: Damage (disabled) on all domains
        ModelType = PhaseFieldDmg
        Gf = 100
        sigmap_mat = userdef
        sigmap = 2e6
        phCrackDrivingForce = principalStress
        sigmacr = 3e6
        lint_ph = 3e-4
        phDmgFunction = user_defined
        strainEnergySplit = none
        regType = impGradient
        lint = 2e-4
        hdmg = 6e-3
        viscRegType = none
      exs1: ExternalStress (disabled) on all domains
        pref = 0[atm]
        StressInputType = PorePressure
        pA = pAVR
        alphaB_mat = userdef
        alphaB = B
      iss1: InitialStressandStrain (disabled) on all domains
        Sil = diag{int1(r[1/m])*1e5*0, int1(r[1/m])*1e5*0, 0}
        eil = diag{int1(r[1/m])*1e-6, int1(r[1/m])*1e-6, 0}
      eiel1: ExternalStrain (disabled) on all domains
        InelasticResidualQuantity = Strain
        StrainInput = StrainTensor
        eext = diag{int1(r[1/m])*1e-6, int1(r[1/m])*1e-6, 0}
      iss2: InitialStressandStrain (disabled) on all domains | eil = B*pAVR/(3*K)
      te1: ThermalExpansion on all domains
        InputType = SecantCoefficient
        alpha_mat = userdef
        alpha = 1
        minput_strainreferencetemperature = 0 [K]
        minput_temperature = eigStr [K]
    free1: Free (default)
    init1: init "Initial Values 1" (default)
    roll1: Roller on boundaries 2 | constraintMethod = nodal
    lemm2: LinearElasticModel "Linear Elastic Material 2" on domains 3
      iss1: InitialStressandStrain (disabled) on all domains | Sil = 0; eil = diag{s_init, s_init, 0}
    disp1: Displacement0 "Prescribed Displacement 1" on points 1 | Direction = {1, 0, 0}
  poeq: PoissonEquation "Poisson's Equation" on domains 1, 2
    dependent variable phi
    ShapeProperty.shapeFunctionType = shlag
    ShapeProperty.order = 1
    Units.SourceTermQuantity = none
    Units.CustomSourceTermUnit = N/m^2
    peq1: PoissonEquation "Poisson's Equation 1" (default) | f = pfEq1; c = {pfEq2, 0, 0, pfEq2}
    zflx1: ZeroFluxBoundary "Zero Flux 1" (default)
    init1: init "Initial Values 1" (default) | d = 0
  tds: DilutedSpecies "Transport of Diluted Species" on domains 1, 2
    dependent variable thP
    ShapeProperty.order_concentration = 1
    EquationForm.form = Transient
    TransportMechanism.Convection = 0
    AdvancedSettings.ConvectiveTerm = cons
    cdm1: ConvectionDiffusionMigration "Transport Properties 1" (default)
      D_cII = {DIIe + Ddam11, Ddam21, 0, Ddam12, DIIe + Ddam22, 0, 0, 0, 0}
      D_cIII = {DIIe + Ddam11, Ddam21, 0, Ddam12, DIIe + Ddam22, 0, 0, 0, 0}
      D_cC = 0
    nflx1: NoFlux (default)
    init1: init "Initial Values 1" (default)
    reac1: Reactions on domains 1, 2 | R_thP = MIIIpr*(AUXmol/AUXm^3)
  tds2: DilutedSpeciesInPorousMedia "Transport of Diluted Species in Porous Media 2" on domains 1, 2
    dependent variable cII = {cII, cIII}
    ShapeProperty.order_concentration = 1
    TransportMechanism.Migration = 0
    porous1: PorousMedium (default)
      fluid1: FluidPorousMedium "Fluid 1" (default)
        tauF = {1, 1}
        FluidDiffusivityModelType = TortuosityModel
        minput_temperature_src = fromCommonDef
        DF_cII = DII*(1-phi)
        DF_cIII = DIII*(1-phi)
        DF_c2 = DIIe
        DF_c3 = DIIe
      pm1: PorousMatrixPorousMedium "Porous Matrix 1" (default) | poro_mat = userdef; poro = VFl
      disp1: Dispersion on all domains | SpecifyDispersionIndividually = 0; DD = phi*Dc
    nflx1: NoFlux (default)
    init1: init "Initial Values 1" (default)
    reac1: Reactions on domains 1, 2 | R_cII = -mIIox; R_cIII = mIIox - mIIIpr
    fl1: FluxBoundary "Flux 1" on boundaries 7, 8, 10, 11 | species = {1, 0}; J0 = {FluxFeII, 0}

Mesh
  mesh1 "Mesh 1"
    size: MeshSizeDefault | hmax = 0.0101; hmin = 4.5E-5
    ftri6: FreeTri "Free Triangular 6" on domains 2
      size1: Size on domains 2 | hmax = SCI/2; hmin = SCI/2; custom = on
    ftri1: FreeTri "Free Triangular 1" on domains 5
      size1: Size on domains 5 | hmax = hsize/2; hmin = hsize/2; custom = on
    ftri4: FreeTri "Free Triangular 4" on domains 4
      size1: Size on domains 4 | hmax = hsize; hmin = hsize; custom = on
    ftri3: FreeTri "Free Triangular 3" on domains 3
      size1: Size on domains 4 | hmax = 0.0101; hmin = 4.5E-5
    ftri5: FreeTri "Free Triangular 5" on remaining entities
      size1: Size on entire geometry
    ftri2: FreeTri "Free Triangular 2" (disabled) on remaining entities
      size1: Size on entire geometry
    dis1: Distribution (disabled) on boundaries 2, 3 | numelem = 50
    dis2: Distribution (disabled) on boundaries 1, 4, 13, 14
    dis3: Distribution (disabled) on no boundaries
    fq1: FreeQuad (disabled) on domains 1, 4
    fq2: FreeQuad (disabled) on no domains
    fq3: FreeQuad (disabled) on no domains

Studies
  std1 "Study 1"
    time: Transient "Time Dependent"
      tlist = range(0,dataTime*daySec, runTime*daySec)
      usertol = on
      rtol = 0.0005
      useinitsol = on
      usesol = on

Solver configurations
  sol4 "Solution 4" (study std1)
    v1: Variables "Dependent Variables 1"
      comp1_u: Field "Displacement field (comp1.u)" | scaleval = 1e-2*0.200249843945
    t1: Time "Time-Dependent Solver 1"
      tlist = range(0,dataTime*daySec, runTime*daySec)
      rtol = 0.0005
      atolglobalfactor = 0.01
      tstepsbdf = manual
      initialstepbdf = 1*24*3600
      maxstepconstraintbdf = expr
      maxstepbdf = 10e6
      maxstepexpressionbdf = if(t<8.7*30*24*3600, 30*24*3600, 0.2*24*3600)
      maxorder = 2
      initialstepfractionbdf-2 = 1/30
      initialstepfractionbdf-5 = 0.1
      timestepbdf = stepSize*daySec
      stabcntrl = on
      estrat = exclude
      dDef: Direct | thresh = 0.1
      se1: Segregated | segterm = itertol; segiter = 5; ntolfact = 10; segtermonres = auto; segstabacc = segaacc
        ssDef: SegregatedStep "Segregated Step Disp"
          segvar = {comp1_u}
          subdtech = auto
          subjtech = onevery
          subtermconst = tol
          subiter = 500
          subtermonres = auto
          maxsubiter = 500
        tds1: SegregatedStep "Segregated Step cII"
          segvar = {comp1_cII}
          subdtech = auto
          subjtech = onevery
          subtermconst = tol
          subiter = 500
          subtermonres = auto
          maxsubiter = 200
        ss2: SegregatedStep "Segregated Step cIII"
          segvar = {comp1_cIII}
          subdtech = auto
          subjtech = onevery
          subtermconst = tol
          subiter = 500
          subtermonres = auto
          maxsubiter = 200
        ss3: SegregatedStep "Segregated step thP"
          segvar = {comp1_thP}
          subdtech = auto
          subjtech = onevery
          subtermconst = tol
          subiter = 500
          subtermonres = auto
          maxsubiter = 200
        ss1: SegregatedStep "Segregated Step pf"
          segvar = {comp1_phi}
          subdtech = auto
          subjtech = onevery
          subtermconst = tol
          subiter = 500
          subtermonres = auto
          maxsubiter = 1000
        ss5: SegregatedStep "Segregated Step Driving Force History" | segvar = {comp1_state1}

Datasets
  dset1: Solution | solution = sol4
  cln1: CutLine2D | data = dset1; genpoints = {{holeX + barDiam/2, holeY}, {holeX + barDiam/2 + 5/1000, holeY}}
  cln2: CutLine2D | data = dset1; genpoints = {{holeX - barDiam/2, holeY}, {holeX - barDiam/2 - 5/1000, holeY}}
  dset2: Solution "Probe Solution 2" | solution = sol4
  int1: Integral "Boundary Probe 1" on boundaries 3 | data = dset2

Derived values
  pev1: EvalPoint "Boundary Probe 1" | data = int1; table = tbl4; expr = inelEps1

Tables
  tbl2: Table
    // Line Integration 1
    Time (d) | -omega*solid.Tax*thickness/(thickness*heigth) (N/m^2)
    0 | 0
    0.1 | 59999.6
    0.2 | 119999
    0.3 | 179999
    0.4 | 239998
    0.5 | 299998
    0.6 | 359998
    0.7 | 419997
    0.8 | 479997
    0.9 | 539997
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  tbl4: Table "Probe Table 4"
    Time (s) | Inelastic part of epsXX, Boundary Probe 1
    0 | 0
    576 | 2.13715e-25
    1440 | 0
    2736 | 0

Plots
  pg3: PlotGroup2D "Stress (solid)" | data = dset1
    surf1: Surface | expr = solid.mises
      def: Deform "Deformation" (disabled) | expr = {u, v}; descr = Displacement field
      hght1: Height "Height Expression 1" (disabled) | expr = solid.disp
  pg23: PlotGroup2D "Displacement" | data = dset1
    surf1: Surface | expr = solid.disp; descr = Displacement magnitude
      def: Deform "Deformation" (disabled) | expr = {u, v}; descr = Displacement field
  pg4: PlotGroup2D "Phase-field" | data = dset1
    surf1: Surface "Phase-field" | expr = phi
      hght1: Height "Height Expression 1" (disabled) | expr = solid.disp
  pg5: PlotGroup2D "Fe2+ concentration" | data = dset1
    surf1: Surface "Fe2+ concentration" | expr = cII
      hght1: Height "Height Expression 1" | expr = solid.disp
  pg6: PlotGroup2D "Fe3+ concentration" | data = dset1
    surf1: Surface "Fe3+ concentration" | expr = cIII
      hght1: Height "Height Expression 1" | expr = solid.disp
  pg7: PlotGroup2D "Precipitate saturation ratio" | data = dset1
    surf1: Surface "Crystal saturation ratio" | expr = Sp
      hght1: Height "Height Expression 1" | expr = solid.disp
  pg8: PlotGroup2D "Eigenstrain" | data = dset1
    surf1: Surface "Eigenstrain" | expr = eigStr
      hght1: Height "Height Expression 1" | expr = solid.disp
  pg22: PlotGroup2D "Mesh" | data = dset1
    mesh1: Mesh
      def1: Deform "Deformation 1" | expr = {u, v}
  pg9: PlotGroup1D "Cut Sp right" | data = cln1
    lngr1: LineGraph "Cut Sp" | expr = Sp
  pg58: PlotGroup1D "Cut Sp left" | data = cln2
    lngr1: LineGraph "Cut Sp" | expr = Sp
  pg42: PlotGroup1D "Probe Plot Group - Crack width"
    tblp1: Table "Probe Table Graph 1" | table = tbl4; plotcolumns = 2

Exports
  data1: Data | data = dset1; expr = d