// COMSOL Multiphysics 5.6.0.401 model "ApproxInflow.mph"
// Outline of the model tree

Parameters
  Lfrac = 5[mm]  // Fracture length
  Uext = 0.0005[mm]  // External displacement
  H = 10[mm]  // Domain height
  Hfrac = 0.4[mm]  // Fracture Height

Geometry
  geom1 "Geometry 1" (2D, length unit m)
    sq1: Square | size = 10[mm]
    sca1: Scale | input = sq1; type = anisotropic; anisotropic = {1, H/10[mm]}; factor = {1, H/10[mm]}; pos = {0, 5[mm]}
    pol1: Polygon
      source = table
      table = {{0, 5[mm]-Hfrac/2}, {Lfrac, 5[mm]-Hfrac/2}, {Lfrac, 5[mm]+Hfrac/2}, {0, 5[mm]+Hfrac/2}}
    fil1: Fillet | point = pol1(1) points 3, 4; radius = Hfrac/2
    dif1: Difference | input = sca1; input2 = fil1
    pol2: Polygon
      source = table
      table = 
        {Lfrac+2[mm], -(H-10[mm])/2}
        {-10[mm], -(H-10[mm])/2}
        {-10[mm], (H+10[mm])/2}
        {Lfrac+2[mm], (H+10[mm])/2}
    dif2: Difference | input = pol2; input2 = dif1; keep = on
    del1: Delete "Delete Entities 1" | input = pol2(1) domains 1
    pol3: Polygon
      type = closed
      source = table
      table = 
        {0, 5[mm]-Hfrac/2-0.3[mm]}
        {Lfrac+1[mm], 5[mm]-Hfrac/2-0.3[mm]}
        {Lfrac+1[mm], 5[mm]+Hfrac/2+0.3[mm]}
        {0[mm], 5[mm]+Hfrac/2+0.3[mm]}
        {-0.5[mm], 5[mm]+Hfrac/2+0.3[mm]}
        {-0.5[mm], 5[mm]-Hfrac/2-0.3[mm]}
    pard1: PartitionDomains
      domain = dif1(1) domains 1; dif2(1) domains 1
      partitionwith = edges
      edge = pol3(1) boundaries 1-6
      object = pol3
      keepobject = off
    fin: Finalize "Form Union"

Materials
  mat1: Common "Material 1" on domains 3, 4
    def "Basic"
      youngsmodulus = 200e9
      poissonsratio = 0.25
      density = 2500
      electricconductivity = 1e7

Physics
  hyd: HydrogenDiffusion on domains 3, 4
    dependent variable u = {u, v, w}
    Type2D.ModeExtension = 0
    StructuralTransientBehavior.StructuralTransientBehavior = Quasistatic
    dif1: Diffusion (default) | DL = 1e-9; Vh = 2e-6; Eb = {15e3, 30e3, 60e3}; NT = {2.5, 1.0, 0}
    lemm1: LinearElasticModel "Linear Elastic Material 1" (default)
    nf1: NoFlux (default)
    init1: init "Initial Values 1" (default)
    disp1: Displacement1 "Prescribed Displacement 1" on boundaries 8 | Direction = {0, 1, 0}; U0 = {0, -0.00[mm], 0}
    disp2: Displacement1 "Prescribed Displacement 2" on boundaries 16 | Direction = {0, 1, 0}; U0 = {0, Uext, 0}
    roll1: Roller on boundaries 18
    AprB1: ApproxBoundary "ApproximateBoundary 1" on boundaries 7, 9, 11-14, 19, 20
      pH = 13
      Em = -0.5
      Eel = -0.033
      k1 = 1e-4
      k2 = 1e-10
      k3 = 1e-6
      k4 = 1.2e5
      k4r = 8.8e9
      k5 = 1e-8
      k6 = 8e-10
      alpha2 = 0.3
      alpha6 = 0.3

Mesh
  mesh3 "Mesh 3"
    size: MeshSizeDefault | hmax = 5.0E-4; hgrad = 1.075; hauto = 1; custom = on
    size2: Size on domains 1 | hmax = 1e-4; custom = on
    size1: Size on domains 2 | hmax = 5.0E-5; hauto = 1; custom = on
    fq1: FreeQuad on domains 1, 3, 4
    ftri1: FreeTri "Free Triangular 1" on remaining entities | smoothmaxiter = 4; smoothmaxdepth = 4
    bl1: BndLayer "Boundary Layers 1" on domains 1-4 | smoothmaxiter = 10; smoothmaxdepth = 10
      blp: BndLayerProp "Boundary Layer Properties" on boundaries 7, 9, 11-14, 19, 20
        blnlayers = 10
        blstretch = 1.25
        inittype = blhmin
        blhmin = 3e-6

Studies
  std1 "Study 1"
    time: Transient "Time Dependent"
      tlist = range(0,20,600)
      mesh = {geom1, mesh3}
      adaptselection = domains 1-4
      pname = Lfrac
      plistarr = range(1[mm],1[mm],8[mm])
      punit = m

Solver configurations
  sol1 "Solution 1" (study std1)
    v1: Variables "Dependent Variables 1" | scalemethod = manual; resscalemethod = manual; resscalethresh = 100
      comp1_C_L: Field "Lattice hydrogen concentration (comp1.C_L)" | scalemethod = manual; scaleval = 0.1
      comp1_u: Field "Displacement field (comp1.u)" | scalemethod = manual; scaleval = Uext
    t1: Time "Time-Dependent Solver 1"
      tlist = range(0,20,600)
      tout = tstepsclosest
      atolglobalfactor = 1
      tderglobalfactor = 0
      atolglobal = 1e-9
      tstepsbdf = manual
      initialstepbdf = 1e-3
      maxstepbdf = 100
      bdforder = 5
      initialstepfractionbdf-1 = 0.05
      initialstepgrowthratebdf-1 = 2
      initialstepgrowthratebdf-2 = 1.1
      initialstepfractionbdf-5 = 1e-5/1
      timestepbdf = 1
      eventtol = 1
      tstepsgenalpha = manual
      rhoinf = 1
      timestepgenalpha = 1
      dDef: Direct | maxrefinesteps = 20
      fc1: FullyCoupled
        linsolver = dDef
        dtech = auto
        initstep = 0.5
        minstep = 1e-6
        rstep = 1e300
        minsteprecovery = 0.25
        maxiter = 250
        initsteph = 1
        minsteph = 1e-4

Datasets
  dset1: Solution | solution = sol1

Plots
  pg2: PlotGroup2D "Concentrations" | data = dset1; title = pH C<SUB>L</SUB>; xlabel = x [mm]; ylabel = y [mm]
    surf1: Surface | expr = C_L

Exports
  plot5: Plot
    exporttype = vtu
    filename = C:\Users\cip17th\OneDrive - Imperial College London\Simulations\Hydrogen Diffusion\Data\CL_CorrosionI.vtu
  plot6: Plot
    exporttype = vtu
    filename = C:\Users\cip17th\OneDrive - Imperial College London\Simulations\Hydrogen Diffusion\Data\pH_CorrosionI.vtu