// COMSOL Multiphysics 5.6.0.401 model "isothermalTDS.mph"
// Outline of the model tree

Parameters
  L = 0.87 [mm]  // (Full) Thickness of the slab
  C_0 = 3 [mol/m^3]  // Initial hydrogen concentration
  h_e = L/100  // Element size
  D = 5e-11 [m^2/s]  // Hydrogen diffusivity at RT
  T = 295.15 [K]

Couplings
  intop1: Integration on domains 1

Geometry
  geom1 "Geometry 1" (1D, length unit m)
    i1: Interval | coord = {0, L/2}
    fin: Finalize "Form Union"

Physics
  tds: DilutedSpecies "Transport of Diluted Species" on all domains
    dependent variable c
    ShapeProperty.order_concentration = 2
    TransportMechanism.Convection = 0
    cdm1: ConvectionDiffusionMigration "Transport Properties 1" (default) | D_c = D; minput_temperature = T
    nflx1: NoFlux (default)
    init1: init "Initial Values 1" (default) | initc = C_0
    conc1: Concentration on boundaries 1 | species = 1

Mesh
  mesh1 "Mesh 1"
    size: MeshSizeDefault | hmax = h_e; hgrad = 1; custom = on
    edg1: Edge on remaining entities
      dis1: Distribution on domains 1 | type = predefined; elemcount = 200; elemratio = 10; method = geometric

Studies
  std1 "Study 1"
    time: Transient "Time Dependent"
      tlist = range(0,10,100) range(100,100,1500) {1572 1577 1583 1588 1594 1599 1605 1610 1616 1621 1627 1632 1637 1643 1649 1654 1659 1665 1670 1676 1681 1687 1692 1698 1703 1709 1714 1720 1725 1731 1736 1742 1747 1753 1758 1764 1769 1775 1780 1786 1791 1797 1803 1808 1814 1819 1825 1830 1836 1841 1847 1852 1857 1863 1868 1874 1879 1885 1890 1896 1901 1907 1912 1918 1924 1929 1934 1940 1946 1951 1957 1962 1968 1973 1979 1984 1990 1995 2001 2006 2012 2017 2023 2028 2034 2039 2045 2050 2056 2061 2067 2072 2078 2083 2089 2094 2100 2105 2111 2116 2122 2127 2133 2138 2144 2149 2155 2160 2166 2171 2177 2182 2188 2193 2199 2204 2209 2215 2221 2226 2232 2237 2243 2248 2254 2259 2265 2270 2276 2281 2287 2292 2298 2303 2309 2314 2320 2325 2331 2336 2342 2347 2353 2358 2364 2369 2375 2380 2385 2391 2396 2402 2407 2413 2418 2424 2429 2435 2440 2446 2451 2457 2462 2468 2473 2479 2484 2490 2495 2501 2506 2512 2517 2522 2528 2534 2539 2544 2550 2555 2561 2566 2572 2577 2583 2588 2594 2600 2605 2611 2616 2622 2627 2632 2638 2643 2649 2654 2660 2665 2671 2676 2682 2687 2692 2698 2703 2709 2714 2720 2725 2731 2736 2742 2747 2753 2758 2764 2769 2775 2780 2786 2791 2797 2802 2808 2813 2819 2824 2830 2835 2841 2846 2852 2857 2862 2868 2873 2879 2884 2890 2895 2901 2906 2912 2917 2923 2928 2934 2939 2945 2950 2955 2961 2966 2972 2978 2983 2988 2994 2999 3005 3010 3016 3021 3027 3032 3038 3043 3049 3054 3060 3065 3071 3076 3082 3087 3093 3098 3104 3109 3115 3120 3126 3131 3137 3142 3148 3153 3159 3164 3170 3175 3181 3186 3192 3197 3203 3208 3214 3219 3225 3230 3236 3241 3247 3252 3257 3263 3268 3274 3279 3285 3290 3296 3301 3307 3312 3318 3323 3329 3334 3340 3346 3351 3357 3362 3368 3373 3379 3384 3390 3395 3401 3406 3412 3417 3423 3428 3434 3439 3445 3450 3456 3461 3467 3472 3477 3483 3488 3494 3499 3505 3511 3516 3521 3527 3532 3538 3543 3549 3554 3560 3565 3571 3576 3582 3587 3592 3598 3603 3609 3614 3620 3625 3631 3636 3642 3647 3653 3658 3664 3669 3675 3680 3686 3691 3697 3702 3708 3713 3718 3724 3729 3735 3740 3746 3751 3757 3762 3768 3773 3779 3784 3790 3795 3801 3806 3812 3817 3823 3828 3834 3839 3845 3850 3856 3861 3867 3872 3878 3883 3889 3894 3900 3905 3911 3916 3922 3927 3933 3938 3944 3949 3955 3960 3966 3971 3976 3982 3987 3993 3998 4004 4009 4015 4020 4026 4031 4037 4042 4048 4053 4059 4064 4069 4075 4081 4086 4091 4097 4102 4108 4113 4119 4124 4130 4135 4141 4146 4152 4157 4163 4168 4174 4179 4185 4190 4196 4201 4207 4212 4218 4223 4229 4234 4240 4245 4250 4256 4261 4267 4272 4278 4283 4289 4294 4300 4305 4311 4316 4322 4327 4333 4338 4344 4349 4355 4360 4366 4371 4376 4382 4387 4393 4398 4404 4409 4415 4420 4426 4432 4437 4443 4448 4454 4459 4465 4470 4475 4481 4486 4492 4497 4503 4508 4514 4519 4525 4530 4536 4541 4547 4552 4557 4563 4569 4574 4580 4585 4591 4596 4602 4607 4613 4618 4624 4629 4635 4640 4646 4651 4657 4662 4667 4673 4678 4684 4689 4695 4700 4706 4711 4717 4722 4728 4733 4738 4744 4749 4755 4760 4766 4771 4777 4782 4788 4793 4799 4804 4809 4815 482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

Solver configurations
  sol1 "Solution 1" (study std1)
    v1: Variables "Dependent Variables 1"
    t1: Time "Time-Dependent Solver 1"
      tlist = range(0,10,100) range(100,100,1500) {1572 1577 1583 1588 1594 1599 1605 1610 1616 1621 1627 1632 1637 1643 1649 1654 1659 1665 1670 1676 1681 1687 1692 1698 1703 1709 1714 1720 1725 1731 1736 1742 1747 1753 1758 1764 1769 1775 1780 1786 1791 1797 1803 1808 1814 1819 1825 1830 1836 1841 1847 1852 1857 1863 1868 1874 1879 1885 1890 1896 1901 1907 1912 1918 1924 1929 1934 1940 1946 1951 1957 1962 1968 1973 1979 1984 1990 1995 2001 2006 2012 2017 2023 2028 2034 2039 2045 2050 2056 2061 2067 2072 2078 2083 2089 2094 2100 2105 2111 2116 2122 2127 2133 2138 2144 2149 2155 2160 2166 2171 2177 2182 2188 2193 2199 2204 2209 2215 2221 2226 2232 2237 2243 2248 2254 2259 2265 2270 2276 2281 2287 2292 2298 2303 2309 2314 2320 2325 2331 2336 2342 2347 2353 2358 2364 2369 2375 2380 2385 2391 2396 2402 2407 2413 2418 2424 2429 2435 2440 2446 2451 2457 2462 2468 2473 2479 2484 2490 2495 2501 2506 2512 2517 2522 2528 2534 2539 2544 2550 2555 2561 2566 2572 2577 2583 2588 2594 2600 2605 2611 2616 2622 2627 2632 2638 2643 2649 2654 2660 2665 2671 2676 2682 2687 2692 2698 2703 2709 2714 2720 2725 2731 2736 2742 2747 2753 2758 2764 2769 2775 2780 2786 2791 2797 2802 2808 2813 2819 2824 2830 2835 2841 2846 2852 2857 2862 2868 2873 2879 2884 2890 2895 2901 2906 2912 2917 2923 2928 2934 2939 2945 2950 2955 2961 2966 2972 2978 2983 2988 2994 2999 3005 3010 3016 3021 3027 3032 3038 3043 3049 3054 3060 3065 3071 3076 3082 3087 3093 3098 3104 3109 3115 3120 3126 3131 3137 3142 3148 3153 3159 3164 3170 3175 3181 3186 3192 3197 3203 3208 3214 3219 3225 3230 3236 3241 3247 3252 3257 3263 3268 3274 3279 3285 3290 3296 3301 3307 3312 3318 3323 3329 3334 3340 3346 3351 3357 3362 3368 3373 3379 3384 3390 3395 3401 3406 3412 3417 3423 3428 3434 3439 3445 3450 3456 3461 3467 3472 3477 3483 3488 3494 3499 3505 3511 3516 3521 3527 3532 3538 3543 3549 3554 3560 3565 3571 3576 3582 3587 3592 3598 3603 3609 3614 3620 3625 3631 3636 3642 3647 3653 3658 3664 3669 3675 3680 3686 3691 3697 3702 3708 3713 3718 3724 3729 3735 3740 3746 3751 3757 3762 3768 3773 3779 3784 3790 3795 3801 3806 3812 3817 3823 3828 3834 3839 3845 3850 3856 3861 3867 3872 3878 3883 3889 3894 3900 3905 3911 3916 3922 3927 3933 3938 3944 3949 3955 3960 3966 3971 3976 3982 3987 3993 3998 4004 4009 4015 4020 4026 4031 4037 4042 4048 4053 4059 4064 4069 4075 4081 4086 4091 4097 4102 4108 4113 4119 4124 4130 4135 4141 4146 4152 4157 4163 4168 4174 4179 4185 4190 4196 4201 4207 4212 4218 4223 4229 4234 4240 4245 4250 4256 4261 4267 4272 4278 4283 4289 4294 4300 4305 4311 4316 4322 4327 4333 4338 4344 4349 4355 4360 4366 4371 4376 4382 4387 4393 4398 4404 4409 4415 4420 4426 4432 4437 4443 4448 4454 4459 4465 4470 4475 4481 4486 4492 4497 4503 4508 4514 4519 4525 4530 4536 4541 4547 4552 4557 4563 4569 4574 4580 4585 4591 4596 4602 4607 4613 4618 4624 4629 4635 4640 4646 4651 4657 4662 4667 4673 4678 4684 4689 4695 4700 4706 4711 4717 4722 4728 4733 4738 4744 4749 4755 4760 4766 4771 4777 4782 4788 4793 4799 4804 4809 4815 482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
      rtol = 0.005
      maxorder = 2
      stabcntrl = on
      fc1: FullyCoupled
        linsolver = d1
        maxiter = 8
        damp = 0.9
        jtech = once
        stabacc = aacc
        aaccdim = 5
        aaccmix = 0.9
        aaccdelay = 1
      d1: Direct "Direct, concentrations (tds)" | linsolver = pardiso; pivotperturb = 1.0E-13
  sol2 "Parametric Solutions 1" (study std1)
  sol3 "Parametric Solutions 2" (study std1)

Datasets
  dset1: Solution | solution = sol1
  dset2: Solution | solution = sol2
  dset3: Solution | solution = sol3

Tables
  tbl1: Table
    X | Height
    0 | 0.00196286
    1.5 | 0.000349422
    3 | 0.000248289
    4.5 | 0.000200687
    6 | 0.000175864
    7.5 | 0.000156422
    9 | 0.000142259
    10.5 | 0.0001315
    12 | 0.000124122
    13.5 | 0.000117114
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
Plots
  pg1: PlotGroup1D "Concentration vs temperature" | data = dset1
    ptgr1: PointGraph on boundaries 2 | expr = comp1.c; xdata = expr; xdataexpr = T
  pg2: PlotGroup1D "Flux vs temperature" | data = dset1
    ptgr1: PointGraph on boundaries 1
      data = dset1
      expr = -1*tds.dflux_cx
      unit = mol/(m^2*s)
      xdata = expr
      xdataexpr = T
  pg3: PlotGroup1D "Concentration (tds)" | data = dset1; typeintitle = off
    lngr1: LineGraph on all domains | expr = c; xdata = expr; xdataexpr = x
  pg4: PlotGroup1D "Concentration/time vs time" | data = dset1
    ptgr1: PointGraph on boundaries 2 | expr = -d(intop1(c),t)/(L/2); xdata = expr; xdataexpr = t
  pg5: PlotGroup1D "Flux vs time" | data = dset1
    ptgr1: PointGraph on boundaries 1
      data = dset1
      expr = -1*tds.dflux_cx
      unit = mol/(mm^2*s)
      xdata = expr
      xdataexpr = t
  pg6: PlotGroup1D "Concentration (tds) 1" | data = dset3; typeintitle = off
    lngr1: LineGraph on all domains | expr = c; xdata = expr; xdataexpr = x

Exports
  plot1: Plot
  plot2: Plot