*Heading
** Job name: Job-1 Model name: Model-1
** Generated by: Abaqus/CAE 2022
*Preprint, echo=NO, model=NO, history=NO, contact=NO
**
** PARTS
**
*Part, name=PART-1
*Node
      1,           0.,           0.,           0.
      2, 0.0416669995,           0.,           0.
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*Element, type=C3D4
    1,    1,    2,   27,  452
    2,    1,    2,  452,  427
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*Elset, elset=Set-1, generate
     1,  36864,      1
** Section: Section-1
*Solid Section, elset=Set-1, material=Material-1
,
*End Part
**
**
** ASSEMBLY
**
*Assembly, name=Assembly
**
*Instance, name=PART-1-1, part=PART-1
*End Instance
**
*Nset, nset=Set-1, instance=PART-1-1, generate
    1,  7201,    25
*Nset, nset=Set-2, instance=PART-1-1, generate
   25,  7225,    25
*Nset, nset=s_Set-3, instance=PART-1-1
 3625,
*Surface, type=NODE, name=Set-2_CNS_, internal
Set-2, 1.
** Constraint: Constraint-2
*Coupling, constraint name=Constraint-2, ref node=s_Set-3, surface=Set-2_CNS_
*Kinematic
1, 1
2, 2
3, 3
*End Assembly
**
** MATERIALS
**
*Material, name=Material-1
*Depvar
    100,
*User Material, constants=2
1.e6, 0.3
**
** BOUNDARY CONDITIONS
**
** Name: BC-2 Type: Symmetry/Antisymmetry/Encastre
*Boundary
Set-1, ENCASTRE
** Name: BC-4 Type: Symmetry/Antisymmetry/Encastre
*Boundary
Set-2, XSYMM
** Name: BC-5 Type: Symmetry/Antisymmetry/Encastre
*Boundary
s_Set-3, PINNED
** ----------------------------------------------------------------
**
** STEP: Step-1
**
*Step,name=Step-1,EXTRAPOLATION = LINEAR,nlgeom=YES
*Static
0.1, 1., 0.1, 0.1
**
** BOUNDARY CONDITIONS
**
** Name: BC-3 Type: Displacement/Rotation
*Boundary
s_Set-3, 4, 4, 0.523599
**
** OUTPUT REQUESTS
**
*Restart, write, frequency=0
**
** FIELD OUTPUT: F-Output-1
**
*Output, field, variable=PRESELECT
**
** HISTORY OUTPUT: H-Output-1
**
*Output, history, variable=PRESELECT
*End Step
